<?xml version="1.0"?>
<?xml-stylesheet type="text/xsl" href="http://jsbsim.sourceforge.net/JSBSim.xsl"?>

<!--
	Author: Slavutinsky Victor
-->

<!-- Vostok-1 -->

<fdm_config name="Vostok-1" version="2.0" release="ALPHA"
	xmlns:xsi="http://www.w3.org/2001/XMLSchema-instance"
	xsi:noNamespaceSchemaLocation="http://jsbsim.sourceforge.net/JSBSim.xsd">

	<fileheader>
		<author> Slavutinsky Victor </author>
		<filecreationdate> 2011-01-10 </filecreationdate>
		<version>$Revision: 1.0$</version>
		<description> Vostok-1 </description>
	</fileheader>

<!--
	There is no possibility to put craft on tail in FG currently,
		so coordinate system in aerodynamics section turned on 90deg.

	(Note added by Thorsten Renk: The above statement isn't true and hasn't been true (as the Space Shuttle proves)
	- the weird shifted coordinate system is an unfortunate design choice that should not be repeated).


	Every phase of flight have it's own flight scheme,
		including fuel tanks, engines, masses of next stages filled and payload,
		areas, arms, moments and forces.
	Phases is changed by nasal script.
	Every phase have small wing in center of mass to count moments.
	Craft weight always zero, stages weights adds by pointmasses.
	For stages up from 2 pointmasses divided to left and right to realistic roll moments.
	Points of sight moves with phase change.
	Perssure counts as zero above 50km by aditional multiplier to all forces.
	Maximum allowed altitude is 70km due to restrictions of simulator.
	Fuel and oxidizer amount in unused tanks is 0.1lbs,
		engines can not be ignited on restart otherwise.
	Moments and forces counted in Datcom+ by simple models
		with little wings and tails what produces not so much
		moments and forces relatively to fuselage.
	Only craft have its own STRUCTURE points,
		STRUCTURE points of upper stages is actually gears.
-->

	<metrics>
		<wingarea unit="FT2">       74.8089  </wingarea>
		<wingspan unit="FT">        19.5400  </wingspan>
		<chord unit="FT">            4.2734  </chord>
		<htailarea unit="FT2">     255.7538  </htailarea>
		<htailarm unit="FT">         9.9688  </htailarm>
		<vtailarea unit="FT2">     127.8769  </vtailarea>
		<vtailarm unit="FT">         9.9688  </vtailarm>
		<location name="AERORP" unit="IN">
			<x>   0.00 </x>
			<y>   0.00 </y>
			<z>   0.00 </z>
		</location>
		<location name="EYEPOINT" unit="IN">
			<x> 0.00 </x>
			<y> 0.00 </y>
			<z> 0.00 </z>
		</location>
		<location name="VRP" unit="IN">
			<x>0</x>
			<y>0</y>
			<z>0</z>
		</location>
	</metrics>

	<mass_balance>
		<ixx unit="SLUG*FT2">       1 </ixx>
		<iyy unit="SLUG*FT2">   1 </iyy>
		<izz unit="SLUG*FT2">   1 </izz>
		<emptywt unit="LBS" >    1.0 </emptywt>
		<location name="CG" unit="IN">
			<x> 0.0 </x>
			<y> 0.0 </y>
			<z> 0.0 </z>
		</location>

		<!-- First stage masses. -->

		<!-- mass 0 -->
		<pointmass name="first_forward_stage_engine">
			<weight unit="LBS"> 2623.0 </weight>
			<location name="POINTMASS" unit="IN">
				<x> -105.94 </x>
				<y> 0.0 </y>
				<z> -562.03 </z>
			</location>
		</pointmass>
		<!-- mass 1 -->
		<pointmass name="first_back_stage_engine">
			<weight unit="LBS"> 2623.0 </weight>
			<location name="POINTMASS" unit="IN">
				<x> 105.94 </x>
				<y> 0.0 </y>
				<z> -562.03 </z>
			</location>
		</pointmass>
		<!-- mass 2 -->
		<pointmass name="first_left_stage_engine">
			<weight unit="LBS"> 2623.0 </weight>
			<location name="POINTMASS" unit="IN">
				<x> 0.0 </x>
				<y> -105.94 </y>
				<z> -562.03 </z>
			</location>
		</pointmass>
		<!-- mass 3 -->
		<pointmass name="first_right_stage_engine">
			<weight unit="LBS"> 2623.0 </weight>
			<location name="POINTMASS" unit="IN">
				<x> 0.0 </x>
				<y> 105.94 </y>
				<z> -562.03 </z>
			</location>
		</pointmass>

		<!-- mass 4 -->
		<pointmass name="first_stage_forward">
			<weight unit="LBS"> 5643.0 </weight>
			<location name="POINTMASS" unit="IN">
				<x> -101.574 </x>
				<y> 0.0 </y>
				<z> -343.3 </z>
			</location>
		</pointmass>
		<!-- mass 5 -->
		<pointmass name="first_stage_back">
			<weight unit="LBS"> 5643.0 </weight>
			<location name="POINTMASS" unit="IN">
				<x> 101.574 </x>
				<y> 0.0 </y>
				<z> -343.3 </z>
			</location>
		</pointmass>
		<!-- mass 6 -->
		<pointmass name="first_stage_left">
			<weight unit="LBS"> 5643.0 </weight>
			<location name="POINTMASS" unit="IN">
				<x> 0.0 </x>
				<y> -101.574 </y>
				<z> -343.3 </z>
			</location>
		</pointmass>
		<!-- mass 7 -->
		<pointmass name="first_stage_right">
			<weight unit="LBS"> 5643.0 </weight>
			<location name="POINTMASS" unit="IN">
				<x> 0.0 </x>
				<y> 101.574 </y>
				<z> -343.3 </z>
			</location>
		</pointmass>

		<!-- From second stage pointmasses divided to forward and back.
			It's needed to calculate roll moments right.-->

		<!-- Second stage masses.
			Accounts same on first stage time and on second too. -->

		<!-- mass 8 -->
		<pointmass name="second_stage_engine_forward">
			<weight unit="LBS"> 1408.0 </weight>
			<location name="POINTMASS" unit="IN">
				<x> -15.05 </x>
				<y> 0.0 </y>
				<z> -562.03 </z>
			</location>
		</pointmass>
		<!-- mass 9 -->
		<pointmass name="second_stage_engine_back">
			<weight unit="LBS"> 1408.0 </weight>
			<location name="POINTMASS" unit="IN">
				<x> 15.05 </x>
				<y> 0.0 </y>
				<z> -562.03 </z>
			</location>
		</pointmass>

		<!-- mass 10 -->
		<pointmass name="second_stage_forward">
			<weight unit="LBS"> 6748.0 </weight>
			<location name="POINTMASS" unit="IN">
				<x> -50.82 </x>
				<y> 0.0 </y>
				<z> 97.83 </z>
			</location>
		</pointmass>
		<!-- mass 11 -->
		<pointmass name="second_stage_back">
			<weight unit="LBS"> 6748.0 </weight>
			<location name="POINTMASS" unit="IN">
				<x> 50.82 </x>
				<y> 0.0 </y>
				<z> 97.83 </z>
			</location>
		</pointmass>

		<!-- mass 12 -->
		<pointmass name="third_stage_w_payload_forward">
			<weight unit="LBS"> 13828.0 </weight>
			<location name="POINTMASS" unit="IN">
				<x> -35.27 </x>
				<y> 0.0 </y>
				<z> 685.35 </z>
			</location>
		</pointmass>
		<!-- mass 13 -->
		<pointmass name="third_stage_w_payload_back">
			<weight unit="LBS"> 13828.0 </weight>
			<location name="POINTMASS" unit="IN">
				<x> 35.27 </x>
				<y> 0.0 </y>
				<z> 685.35 </z>
			</location>
		</pointmass>

		<!-- Fairings position given for first and second stages configuration.
			Position of fairings changed by Nasal stages change script. -->

		<!-- mass 14 -->
		<pointmass name="fairings_forward">
			<weight unit="LBS"> 716.50 </weight>
			<location name="POINTMASS" unit="IN">
				<x> -51.29 </x>
				<y> 0.0 </y>
				<z> 772.986 </z>
			</location>
		</pointmass>
		<!-- mass 15 -->
		<pointmass name="fairings_back">
			<weight unit="LBS"> 716.50 </weight>
			<location name="POINTMASS" unit="IN">
				<x> 51.29 </x>
				<y> 0.0 </y>
				<z> 772.986 </z>
			</location>
		</pointmass>

		<!-- Not what next masses is given loaded only for check reasons
			and updates by stage change Nasal script. -->

		<!-- Third stage masses. -->

		<!-- mass 16 -->
		<pointmass name="third_stage_engine_forward">
			<weight unit="LBS"> 133.37 </weight>
			<location name="POINTMASS" unit="IN">
				<x> -10.07 </x>
				<y> 0.0 </y>
				<z> -93.7 </z>
			</location>
		</pointmass>
		<!-- mass 17 -->
		<pointmass name="third_stage_engine_back">
			<weight unit="LBS"> 133.37 </weight>
			<location name="POINTMASS" unit="IN">
				<x> 10.07 </x>
				<y> 0.0 </y>
				<z> -93.7 </z>
			</location>
		</pointmass>

		<!-- mass 18 -->
		<pointmass name="third_stage_forward">
			<weight unit="LBS"> 1576.30 </weight>
			<location name="POINTMASS" unit="IN">
				<x> -39.25 </x>
				<y> 0.0 </y>
				<z> -63.14 </z>
			</location>
		</pointmass>
		<!-- mass 19 -->
		<pointmass name="third_stage_back">
			<weight unit="LBS"> 1576.30 </weight>
			<location name="POINTMASS" unit="IN">
				<x> 39.25 </x>
				<y> 0.0 </y>
				<z> -63.14 </z>
			</location>
		</pointmass>

		<!-- mass 20 -->
		<pointmass name="tdu_forward">
			<weight unit="LBS"> 2502.24 </weight>
			<location name="POINTMASS" unit="IN">
				<x> -25.78 </x>
				<y> 0.0 </y>
				<z> 3.85 </z>
			</location>
		</pointmass>
		<!-- mass 21 -->
		<pointmass name="tdu_back">
			<weight unit="LBS"> 2502.24 </weight>
			<location name="POINTMASS" unit="IN">
				<x> 25.78 </x>
				<y> 0.0 </y>
				<z> 3.85 </z>
			</location>
		</pointmass>

		<!-- Note what spaceship center of weight is down
			from center of sphere. -->

		<!-- mass 22 -->
		<pointmass name="spacecraft_left">
			<weight unit="LBS"> 2711.68 </weight>
			<location name="POINTMASS" unit="IN">
				<x> -19.8 </x>
				<y> 0.0 </y>
				<z> 49.44 </z>
			</location>
		</pointmass>
		<!-- mass 23 -->
		<pointmass name="spacecraft_right">
			<weight unit="LBS"> 2711.68 </weight>
			<location name="POINTMASS" unit="IN">
				<x> 19.8 </x>
				<y> 0.0 </y>
				<z> 49.44 </z>
			</location>
		</pointmass>

		<!-- TDU stage masses -->

		<!-- mass 24 -->
		<pointmass name="tdu_stage_engine_forward">
			<weight unit="LBS"> 108.02 </weight>
			<location name="POINTMASS" unit="IN">
				<x> -5.196 </x>
				<y> 0.0 </y>
				<z> -53.49 </z>
			</location>
		</pointmass>
		<!-- mass 25 -->
		<pointmass name="tdu_stage_engine_back">
			<weight unit="LBS"> 108.02 </weight>
			<location name="POINTMASS" unit="IN">
				<x> 5.196 </x>
				<y> 0.0 </y>
				<z> -53.49 </z>
			</location>
		</pointmass>

		<!-- mass 26 -->
		<pointmass name="tdu_stage_forward">
			<weight unit="LBS"> 1576.30 </weight>
			<location name="POINTMASS" unit="IN">
				<x> -33.62 </x>
				<y> 0.0 </y>
				<z> -25.98 </z>
			</location>
		</pointmass>
		<!-- mass 27 -->
		<pointmass name="tdu_stage_back">
			<weight unit="LBS"> 1576.30 </weight>
			<location name="POINTMASS" unit="IN">
				<x> 33.62 </x>
				<y> 0.0 </y>
				<z> -25.98 </z>
			</location>
		</pointmass>

		<!-- mass 28 -->
		<pointmass name="spacecraft_left">
			<weight unit="LBS"> 2711.68 </weight>
			<location name="POINTMASS" unit="IN">
				<x> -19.8 </x>
				<y> 0.0 </y>
				<z> 23.62 </z>
			</location>
		</pointmass>
		<!-- mass 29 -->
		<pointmass name="spacecraft_right">
			<weight unit="LBS"> 2711.68 </weight>
			<location name="POINTMASS" unit="IN">
				<x> 19.8 </x>
				<y> 0.0 </y>
				<z> 23.62 </z>
			</location>
		</pointmass>

		<!-- Spacecraft masses -->

		<!-- masses 30, 31, 31  -->
		<pointmass name="spacecraft_left">
			<weight unit="LBS"> 2711.68 </weight>
			<location name="POINTMASS" unit="M">
				<x> 0.0 </x>
				<y> 0.0 </y>
				<z> -0.662 </z>
			</location>
		</pointmass>
		<pointmass name="spacecraft_left">
			<weight unit="LBS"> 1355.84 </weight>
			<location name="POINTMASS" unit="M">
				<x> 0.561 </x>
				<y> -0.5 </y>
				<z> -0.431 </z>
			</location>
		</pointmass>
		<pointmass name="spacecraft_right">
			<weight unit="LBS"> 1355.84 </weight>
			<location name="POINTMASS" unit="M">
				<x> 0.561 </x>
				<y> 0.5 </y>
				<z> -0.431 </z>
			</location>
		</pointmass>

	</mass_balance>

	<propulsion>

	<!-- First stage -->

		<!-- First first stage, forward -->

		<!-- 0, main -->

		<engine file="RD-107-Main">
			<location unit="IN">
				<x> -101.73 </x>
				<y> 0.0 </y>
				<z> -562.03 </z>
			</location>
			<orient unit="DEG">
				<pitch> 90.00 </pitch>
				<roll>  0.00 </roll>
				<yaw>   90.00 </yaw>
			</orient>
			<feed>0</feed>
			<feed>1</feed>
			<thruster file="RD-107-Main-Nozzle">
				<location unit="IN">
					<x> -101.73 </x>
					<y> 0.0 </y>
					<z> -562.03 </z>
				</location>
				<orient unit="DEG">
					<pitch> 90.00 </pitch>
					<roll>  0.00 </roll>
					<yaw>   90.00 </yaw>
				</orient>
			</thruster>
		</engine>

		<!-- 1, forward -->

	<!-- Note what forward and back maneur engines turned left and rignt on yaw axis.
		So engines pitch change moves it in roll real axis actually,
		what makes craft to yaw. -->

		<engine file="RD-107-Maneur">
			<location unit="IN">
				<x> -149.56 </x>
				<y> 0.0 </y>
				<z> -562.03 </z>
			</location>
			<orient unit="DEG">
				<pitch> 90.00 </pitch>
				<roll>   0.00 </roll>
				<yaw>   90.00 </yaw>
			</orient>
			<feed>0</feed>
			<feed>1</feed>
			<thruster file="RD-107-Maneur-Nozzle">
				<location unit="IN">
					<x> -149.56 </x>
					<y> 0.0 </y>
					<z> -562.03 </z>
				</location>
				<orient unit="DEG">
					<pitch> 90.00 </pitch>
					<roll>   0.00 </roll>
					<yaw>   90.00 </yaw>
				</orient>
			</thruster>
		</engine>

		<tank type="OXIDIZER" number="0">
			<location unit="IN">
				<x> -84.52 </x>
				<y> 0.0 </y>
				<z> -151.2 </z>
			</location>
			<capacity unit="LBS"> 65000.00 </capacity>
		<!--	<contents unit="LBS"> 61147.00 </contents> -->
			<contents unit="LBS"> 0.10 </contents>
			<density unit="KG/L"> 1.14 </density>
		</tank>

		<tank type="FUEL" number="1">
			<location unit="IN">
				<x> -90.39 </x>
				<y> 0.0 </y>
				<z> -331.64 </z>
			</location>
			<capacity unit="LBS"> 25000.00 </capacity>
		<!--	<contents unit="LBS"> 24724.00 </contents> -->
			<contents unit="LBS"> 0.10 </contents>
			<density unit="LBS/GAL"> 6.88 </density>
		</tank>

		<!-- Second first stage, back -->

		<!-- 2, main -->

		<engine file="RD-107-Main">
			<location unit="IN">
				<x> 101.73 </x>
				<y> 0.0 </y>
				<z> -562.03 </z>
			</location>
			<orient unit="DEG">
				<pitch> 90.00 </pitch>
				<roll>   0.00 </roll>
				<yaw>   -90.00 </yaw>
			</orient>
			<feed>2</feed>
			<feed>3</feed>
			<thruster file="RD-107-Main-Nozzle">
				<location unit="IN">
					<x> 101.73 </x>
					<y> 0.0 </y>
					<z> -562.03 </z>
				</location>
				<orient unit="DEG">
					<pitch> 90.00 </pitch>
					<roll>  0.00 </roll>
					<yaw>   -90.00 </yaw>
				</orient>
			</thruster>
		</engine>

		<!-- 3, back -->

		<engine file="RD-107-Maneur">
			<location unit="IN">
				<x> 149.56 </x>
				<y> 0.0 </y>
				<z> -562.03 </z>
			</location>
			<orient unit="DEG">
				<pitch> 90.00 </pitch>
				<roll>   0.00 </roll>
				<yaw>   -90.00 </yaw>
			</orient>
			<feed>2</feed>
			<feed>3</feed>
			<thruster file="RD-107-Maneur-Nozzle">
				<location unit="IN">
					<x> 149.56 </x>
					<y> 0.0 </y>
					<z> -562.03 </z>
				</location>
				<orient unit="DEG">
					<pitch> 90.00 </pitch>
					<roll>   0.00 </roll>
					<yaw>   -90.00 </yaw>
				</orient>
			</thruster>
		</engine>

		<tank type="OXIDIZER" number="2">
			<location unit="IN">
				<x> 84.52 </x>
				<y> 0.0 </y>
				<z> -151.2 </z>
			</location>
			<capacity unit="LBS"> 65000.00 </capacity>
		<!--	<contents unit="LBS"> 61147.00 </contents> -->
			<contents unit="LBS"> 0.10 </contents>
			<density unit="KG/L"> 1.14 </density>
		</tank>

		<tank type="FUEL" number="3">
			<location unit="IN">
				<x> 90.39 </x>
				<y> 0.0 </y>
				<z> -331.64 </z>
			</location>
			<capacity unit="LBS"> 25000.00 </capacity>
		<!--	<contents unit="LBS"> 24724.00 </contents> -->
			<contents unit="LBS"> 0.10 </contents>
			<density unit="LBS/GAL"> 6.88 </density>
		</tank>

		<!-- Third first stage, left -->

		<!-- 4, main -->

		<engine file="RD-107-Main">
			<location unit="IN">
				<x> 0.0 </x>
				<y> -101.73 </y>
				<z> -562.03 </z>
			</location>
			<orient unit="DEG">
				<pitch> 90.00 </pitch>
				<roll>  0.00 </roll>
				<yaw>   0.00 </yaw>
			</orient>
			<feed>4</feed>
			<feed>5</feed>
			<thruster file="RD-107-Main-Nozzle">
				<location unit="IN">
					<x> 0.0 </x>
					<y> -101.73 </y>
					<z> -562.03 </z>
				</location>
				<orient unit="DEG">
					<pitch> 90.00 </pitch>
					<roll>  0.00 </roll>
					<yaw>   0.00 </yaw>
				</orient>
			</thruster>
		</engine>

		<!-- 5, left -->

		<engine file="RD-107-Maneur">
			<location unit="IN">
				<x> 0.0 </x>
				<y> -149.56 </y>
				<z> -562.03 </z>
			</location>
			<orient unit="DEG">
				<pitch> 90.00 </pitch>
				<roll>  0.00 </roll>
				<yaw>   0.00 </yaw>
			</orient>
			<feed>4</feed>
			<feed>5</feed>
			<thruster file="RD-107-Maneur-Nozzle">
				<location unit="IN">
					<x> 0.0 </x>
					<y> -149.56 </y>
					<z> -562.03 </z>
				</location>
				<orient unit="DEG">
					<pitch> 90.00 </pitch>
					<roll>  0.00  </roll>
					<yaw>   0.00 </yaw>
				</orient>
			</thruster>
		</engine>

		<tank type="OXIDIZER" number="4">
			<location unit="IN">
				<x> 0.0 </x>
				<y> -84.52 </y>
				<z> -151.2 </z>
			</location>
			<capacity unit="LBS"> 65000.00 </capacity>
		<!--	<contents unit="LBS"> 61147.00 </contents> -->
			<contents unit="LBS"> 0.10 </contents>
			<density unit="KG/L"> 1.14 </density>
		</tank>

		<tank type="FUEL" number="5">
			<location unit="IN">
				<x> 0.0 </x>
				<y> -90.39 </y>
				<z> -331.64 </z>
			</location>
			<capacity unit="LBS"> 25000.00 </capacity>
		<!--	<contents unit="LBS"> 24724.00 </contents> -->
			<contents unit="LBS"> 0.10 </contents>
			<density unit="LBS/GAL"> 6.88 </density>
		</tank>

		<!-- Fourth first stage -->

		<!-- 6, main -->

		<engine file="RD-107-Main">
			<location unit="IN">
				<x> 0.0 </x>
				<y> 101.73 </y>
				<z> -562.03 </z>
			</location>
			<orient unit="DEG">
				<pitch> 90.00 </pitch>
				<roll>  0.00 </roll>
				<yaw>   180.00 </yaw>
			</orient>
			<feed>6</feed>
			<feed>7</feed>
			<thruster file="RD-107-Main-Nozzle">
				<location unit="IN">
					<x> 0.0 </x>
					<y> 101.73 </y>
					<z> -562.03 </z>
				</location>
				<orient unit="DEG">
					<pitch> 90.00 </pitch>
					<roll>  0.00 </roll>
					<yaw>   180.00 </yaw>
				</orient>
			</thruster>
		</engine>

		<!-- 7, right -->

		<engine file="RD-107-Maneur">
			<location unit="IN">
				<x> 0.0 </x>
				<y> 149.56 </y>
				<z> -562.03 </z>
			</location>
			<orient unit="DEG">
				<pitch> 90.00 </pitch>
				<roll>  0.00 </roll>
				<yaw>   180.00 </yaw>
			</orient>
			<feed>6</feed>
			<feed>7</feed>
			<thruster file="RD-107-Maneur-Nozzle">
				<location unit="IN">
					<x> 0.0 </x>
					<y> 149.56 </y>
					<z> -562.03 </z>
				</location>
				<orient unit="DEG">
					<pitch> 90.00 </pitch>
					<roll>  0.00 </roll>
					<yaw>   180.00 </yaw>
				</orient>
			</thruster>
		</engine>

		<tank type="OXIDIZER" number="6">
			<location unit="IN">
				<x> 0.0 </x>
				<y> 84.52 </y>
				<z> -151.2 </z>
			</location>
			<capacity unit="LBS"> 65000.00 </capacity>
		<!--	<contents unit="LBS"> 61147.00 </contents> -->
			<contents unit="LBS"> 0.10 </contents>
			<density unit="KG/L"> 1.14 </density>
		</tank>

		<tank type="FUEL" number="7">
			<location unit="IN">
				<x> 0.0 </x>
				<y> 90.39 </y>
				<z> -331.64 </z>
			</location>
			<capacity unit="LBS"> 25000.00 </capacity>
		<!--	<contents unit="LBS"> 24724.00 </contents> -->
			<contents unit="LBS"> 0.10 </contents>
			<density unit="LBS/GAL"> 6.88 </density>
		</tank>

	<!-- Second stage -->

		<!-- 8, main left -->

		<engine file="RD-108-Main">
			<location unit="IN">
				<x> -10.0 </x>
				<y> 0.0 </y>
				<z> -562.03 </z>
			</location>
			<orient unit="DEG">
				<pitch> 90.00 </pitch>
				<roll>  0.00 </roll>
				<yaw>   0.00 </yaw>
			</orient>
			<feed>8</feed>
			<feed>9</feed>
			<feed>10</feed>
			<feed>11</feed>
			<thruster file="RD-108-Main-Nozzle">
				<location unit="IN">
					<x> -10.0 </x>
					<y> 0.0 </y>
					<z> -562.03 </z>
				</location>
				<orient unit="DEG">
					<pitch> 90.00 </pitch>
					<roll>  0.00 </roll>
					<yaw>   0.00 </yaw>
				</orient>
			</thruster>
		</engine>

		<!-- 9, main right -->

		<engine file="RD-108-Main">
			<location unit="IN">
				<x> 10.0 </x>
				<y> 0.0 </y>
				<z> -562.03 </z>
			</location>
			<orient unit="DEG">
				<pitch> 90.00 </pitch>
				<roll>  0.00 </roll>
				<yaw>   180.00 </yaw>
			</orient>
			<feed>8</feed>
			<feed>9</feed>
			<feed>10</feed>
			<feed>11</feed>
			<thruster file="RD-108-Main-Nozzle">
				<location unit="IN">
					<x> 10.0 </x>
					<y> 0.0 </y>
					<z> -562.03 </z>
				</location>
				<orient unit="DEG">
					<pitch> 90.00 </pitch>
					<roll>  0.00 </roll>
					<yaw>   180.00 </yaw>
				</orient>
			</thruster>
		</engine>

		<!-- 10, forward -->

		<engine file="RD-108-Maneur">
			<location unit="IN">
				<x> -44.72 </x>
				<y> 0.0 </y>
				<z> -562.03 </z>
			</location>
			<orient unit="DEG">
				<pitch> 90.00 </pitch>
				<roll>   0.00 </roll>
				<yaw>   90.00 </yaw>
			</orient>
			<feed>8</feed>
			<feed>9</feed>
			<feed>10</feed>
			<feed>11</feed>
			<thruster file="RD-108-Maneur-Nozzle">
				<location unit="IN">
					<x> -44.72 </x>
					<y> 0.0 </y>
					<z> -562.03 </z>
				</location>
				<orient unit="DEG">
					<pitch> 90.00 </pitch>
					<roll>   0.00 </roll>
					<yaw>   90.00 </yaw>
				</orient>
			</thruster>
		</engine>

		<!-- 11, back -->

		<engine file="RD-108-Maneur">
			<location unit="IN">
				<x> 44.72 </x>
				<y> 0.0 </y>
				<z> -562.03 </z>
			</location>
			<orient unit="DEG">
				<pitch> 90.00 </pitch>
				<roll>   0.00 </roll>
				<yaw>   -90.00 </yaw>
			</orient>
			<feed>8</feed>
			<feed>9</feed>
			<feed>10</feed>
			<feed>11</feed>
			<thruster file="RD-108-Maneur-Nozzle">
				<location unit="IN">
					<x> 44.72 </x>
					<y> 0.0 </y>
					<z> -562.03 </z>
				</location>
				<orient unit="DEG">
					<pitch> 90.00 </pitch>
					<roll>   0.00 </roll>
					<yaw>   -90.00 </yaw>
				</orient>
			</thruster>
		</engine>

		<!-- 12, left -->

		<engine file="RD-108-Maneur">
			<location unit="IN">
				<x> 0.0 </x>
				<y> -44.72 </y>
				<z> -562.03 </z>
			</location>
			<orient unit="DEG">
				<pitch> 90.00 </pitch>
				<roll>  0.00 </roll>
				<yaw>   0.00 </yaw>
			</orient>
			<feed>8</feed>
			<feed>9</feed>
			<feed>10</feed>
			<feed>11</feed>
			<thruster file="RD-108-Maneur-Nozzle">
				<location unit="IN">
					<x> 0.0 </x>
					<y> -44.72 </y>
					<z> -562.03 </z>
				</location>
				<orient unit="DEG">
					<pitch> 90.00 </pitch>
					<roll>  0.00  </roll>
					<yaw>   0.00 </yaw>
				</orient>
			</thruster>
		</engine>

		<!-- 13, right  -->

		<engine file="RD-108-Maneur">
			<location unit="IN">
				<x> 0.0 </x>
				<y> 44.72 </y>
				<z> -562.03 </z>
			</location>
			<orient unit="DEG">
				<pitch> 90.00 </pitch>
				<roll>  0.00 </roll>
				<yaw>   180.00 </yaw>
			</orient>
			<feed>8</feed>
			<feed>9</feed>
			<feed>10</feed>
			<feed>11</feed>
			<thruster file="RD-108-Maneur-Nozzle">
				<location unit="IN">
					<x> 0.0 </x>
					<y> 44.72 </y>
					<z> -562.03 </z>
				</location>
				<orient unit="DEG">
					<pitch> 90.00 </pitch>
					<roll>  0.00 </roll>
					<yaw>   180.00 </yaw>
				</orient>
			</thruster>
		</engine>

		<!--  Tanks divided on forward and back to
			realist account of roll moments.-->

		<tank type="OXIDIZER" number="8">
			<location unit="IN">
				<x> -26.96 </x>
				<y> 0.0 </y>
				<z> 330.17 </z>
			</location>
			<capacity unit="LBS"> 75000.00 </capacity>
		<!--	<contents unit="LBS"> 71633.00 </contents> -->
			<contents unit="LBS"> 0.10 </contents>
			<density unit="KG/L"> 1.14 </density>
		</tank>

		<tank type="OXIDIZER" number="9">
			<location unit="IN">
				<x> 26.96 </x>
				<y> 0.0 </y>
				<z> 330.17 </z>
			</location>
			<capacity unit="LBS"> 75000.00 </capacity>
		<!--	<contents unit="LBS"> 71633.00 </contents> -->
			<contents unit="LBS"> 0.10 </contents>
			<density unit="KG/L"> 1.14 </density>
		</tank>

		<tank type="FUEL" number="10">
			<location unit="IN">
				<x> -21.53 </x>
				<y> 0.00 </y>
				<z> -146.28 </z>
			</location>
			<capacity unit="LBS"> 30000.00 </capacity>
		<!--	<contents unit="LBS"> 29359.00 </contents> -->
			<contents unit="LBS"> 0.10 </contents>
			<density unit="LBS/GAL"> 6.88 </density>
		</tank>

		<tank type="FUEL" number="11">
			<location unit="IN">
				<x> 21.53 </x>
				<y> 0.00 </y>
				<z> -146.28 </z>
			</location>
			<capacity unit="LBS"> 30000.00 </capacity>
		<!--	<contents unit="LBS"> 29359.00 </contents> -->
			<contents unit="LBS"> 0.10 </contents>
			<density unit="LBS/GAL"> 6.88 </density>
		</tank>

	<!-- Third stage -->

		<!-- 14, main -->

		<engine file="RD-0109-Main">
			<location unit="IN">
				<x> 0.0 </x>
				<y> 0.0 </y>
				<z> -137.99 </z>
			</location>
			<orient unit="DEG">
				<pitch> 90.00 </pitch>
				<roll>   0.00 </roll>
				<yaw>   0.00 </yaw>
			</orient>
			<feed>12</feed>
			<feed>13</feed>
			<feed>14</feed>
			<feed>15</feed>
			<thruster file="RD-0109-Main-Nozzle">
				<location unit="IN">
					<x> 0.0 </x>
					<y> 0.0 </y>
					<z> -137.99 </z>
				</location>
				<orient unit="DEG">
					<pitch> 90.00 </pitch>
					<roll>   0.00 </roll>
					<yaw>   0.00 </yaw>
				</orient>
			</thruster>
		</engine>

		<!-- 15, forward -->

		<engine file="RD-0109-Pitch">
			<location unit="IN">
				<x> -54.76 </x>
				<y>   0.0 </y>
				<z> -121.69 </z>
			</location>
			<orient unit="DEG">
				<pitch> 58.00 </pitch>
				<roll>   0.00 </roll>
				<yaw>   0.00 </yaw>
			</orient>
			<feed>12</feed>
			<feed>13</feed>
			<feed>14</feed>
			<feed>15</feed>
			<thruster file="RD-0109-Pitch-Nozzle">
				<location unit="IN">
					<x> -54.76 </x>
					<y>   0.0 </y>
					<z> -121.69 </z>
				</location>
				<orient unit="DEG">
					<pitch> 58.00 </pitch>
					<roll>   0.00 </roll>
					<yaw>   0.00 </yaw>
				</orient>
			</thruster>
		</engine>

		<!-- 16, back -->

		<engine file="RD-0109-Pitch">
			<location unit="IN">
				<x> 54.76 </x>
				<y>   0.0 </y>
				<z> -121.69 </z>
			</location>
			<orient unit="DEG">
				<pitch> 122.00 </pitch>
				<roll>   0.00 </roll>
				<yaw>   0.00 </yaw>
			</orient>
			<feed>12</feed>
			<feed>13</feed>
			<feed>14</feed>
			<feed>15</feed>
			<thruster file="RD-0109-Pitch-Nozzle">
				<location unit="IN">
					<x> 54.76 </x>
					<y>   0.0 </y>
					<z> -121.69 </z>
				</location>
				<orient unit="DEG">
					<pitch> 122.00 </pitch>
					<roll>   0.00 </roll>
					<yaw>   0.00 </yaw>
				</orient>
			</thruster>
		</engine>

		<!-- 17, left -->

		<engine file="RD-0109-Pitch">
			<location unit="IN">
				<x> 0.0 </x>
				<y> -54.76 </y>
				<z> -121.69 </z>
			</location>
			<orient unit="DEG">
				<pitch> 58.00 </pitch>
				<roll>  0.00 </roll>
				<yaw>   -90.00 </yaw>
			</orient>
			<feed>12</feed>
			<feed>13</feed>
			<feed>14</feed>
			<feed>15</feed>
			<thruster file="RD-0109-Pitch-Nozzle">
				<location unit="IN">
					<x> 0.0 </x>
					<y> -54.76 </y>
					<z> -121.69 </z>
				</location>
				<orient unit="DEG">
					<pitch> 58.00 </pitch>
					<roll>  0.00 </roll>
					<yaw>   -90.00 </yaw>
				</orient>
			</thruster>
		</engine>

		<!-- 18, right -->

		<engine file="RD-0109-Pitch">
			<location unit="IN">
				<x> 0.0 </x>
				<y> 54.76 </y>
				<z> -121.69 </z>
			</location>
			<orient unit="DEG">
				<pitch> 58.00 </pitch>
				<roll>  0.00 </roll>
				<yaw>   90.00 </yaw>
			</orient>
			<feed>12</feed>
			<feed>13</feed>
			<feed>14</feed>
			<feed>15</feed>
			<thruster file="RD-0109-Pitch-Nozzle">
				<location unit="IN">
					<x> 0.0 </x>
					<y> 54.76 </y>
					<z> -121.69 </z>
				</location>
				<orient unit="DEG">
					<pitch> 58.00 </pitch>
					<roll>  0.00 </roll>
					<yaw>   90.00 </yaw>
				</orient>
			</thruster>
		</engine>

		<!-- 19, left forward roll -->

		<engine file="RD-0109-Roll">
			<location unit="IN">
				<x> -53.858 </x>
				<y> -3.188 </y>
				<z> -111.417 </z>
			</location>
			<orient unit="DEG">
				<pitch> 0.0 </pitch>
				<roll>  0.00 </roll>
				<yaw>   90.00 </yaw>
			</orient>
			<feed>12</feed>
			<feed>13</feed>
			<feed>14</feed>
			<feed>15</feed>
			<thruster file="RD-0109-Roll-Nozzle">
				<location unit="IN">
					<x> -53.858 </x>
					<y> -3.188 </y>
					<z> -111.417 </z>
				</location>
				<orient unit="DEG">
					<pitch> 0.0 </pitch>
					<roll>  0.00 </roll>
					<yaw>   90.00 </yaw>
				</orient>
			</thruster>
		</engine>

		<!-- 20, right back roll -->

		<engine file="RD-0109-Roll">
			<location unit="IN">
				<x> 53.858 </x>
				<y> 3.188 </y>
				<z> -111.417 </z>
			</location>
			<orient unit="DEG">
				<pitch> 0.0 </pitch>
				<roll>  0.00 </roll>
				<yaw>   -90.00 </yaw>
			</orient>
			<feed>12</feed>
			<feed>13</feed>
			<feed>14</feed>
			<feed>15</feed>
			<thruster file="RD-0109-Roll-Nozzle">
				<location unit="IN">
					<x> 53.858 </x>
					<y> 3.188 </y>
					<z> -111.417 </z>
				</location>
				<orient unit="DEG">
					<pitch> 0.00 </pitch>
					<roll>  0.00 </roll>
					<yaw>   -90.00 </yaw>
				</orient>
			</thruster>
		</engine>

		<!-- 21, right forward roll -->

		<engine file="RD-0109-Roll">
			<location unit="IN">
				<x> -53.858 </x>
				<y> 3.188 </y>
				<z> -111.417 </z>
			</location>
			<orient unit="DEG">
				<pitch> 0.00 </pitch>
				<roll>  0.00 </roll>
				<yaw>   -90.00 </yaw>
			</orient>
			<feed>12</feed>
			<feed>13</feed>
			<feed>14</feed>
			<feed>15</feed>
			<thruster file="RD-0109-Roll-Nozzle">
				<location unit="IN">
					<x> -53.858 </x>
					<y> 3.188 </y>
					<z> -111.417 </z>
				</location>
				<orient unit="DEG">
					<pitch> 0.00 </pitch>
					<roll>  0.00 </roll>
					<yaw>   -90.00 </yaw>
				</orient>
			</thruster>
		</engine>

		<!-- 22, left back roll -->

		<engine file="RD-0109-Roll">
			<location unit="IN">
				<x> 53.858 </x>
				<y> -3.188 </y>
				<z> -111.417 </z>
			</location>
			<orient unit="DEG">
				<pitch> 0.00 </pitch>
				<roll>  0.00 </roll>
				<yaw>   90.00 </yaw>
			</orient>
			<feed>12</feed>
			<feed>13</feed>
			<feed>14</feed>
			<feed>15</feed>
			<thruster file="RD-0109-Roll-Nozzle">
				<location unit="IN">
					<x> 53.858 </x>
					<y> 3.188 </y>
					<z> -111.417 </z>
				</location>
				<orient unit="DEG">
					<pitch> 0.00 </pitch>
					<roll>  0.00 </roll>
					<yaw>   90.00 </yaw>
				</orient>
			</thruster>
		</engine>

	<!--  Note what tanks added as filled to show contents.
		initial filling of tanks accounts by stages change Nasal script.-->

		<!--  Tanks divided on forward and back to
			realist account of roll moments. -->

		<tank type="OXIDIZER" number="12">
			<location unit="IN">
				<x> -31.18 </x>
				<y> 0.0 </y>
				<z> -57.83 </z>
			</location>
			<capacity unit="LBS"> 5000.00 </capacity>
		<!--	<contents unit="LBS"> 4828.00 </contents> -->
			<contents unit="LBS"> 0.10 </contents>
			<density unit="KG/L"> 1.14 </density>
		</tank>

		<tank type="OXIDIZER" number="13">
			<location unit="IN">
				<x> 31.18 </x>
				<y> 0.0 </y>
				<z> -57.83 </z>
			</location>
			<capacity unit="LBS"> 5000.00 </capacity>
		<!--	<contents unit="LBS"> 4828.00 </contents> -->
			<contents unit="LBS"> 0.10 </contents>
			<density unit="KG/L"> 1.14 </density>
		</tank>

		<tank type="FUEL" number="14">
			<location unit="IN">
				<x> -31.18 </x>
				<y> 0.00 </y>
				<z> -103.58 </z>
			</location>
			<capacity unit="LBS"> 2500.00 </capacity>
		<!--	<contents unit="LBS"> 2204.00 </contents> -->
			<contents unit="LBS"> 0.10 </contents>
			<density unit="LBS/GAL"> 6.88 </density>
		</tank>

		<tank type="FUEL" number="15">
			<location unit="IN">
				<x> 31.18 </x>
				<y> 0.00 </y>
				<z> -103.58 </z>
			</location>
			<capacity unit="LBS"> 2500.00 </capacity>
		<!--	<contents unit="LBS"> 2204.00 </contents> -->
			<contents unit="LBS"> 0.10 </contents>
			<density unit="LBS/GAL"> 6.88 </density>
		</tank>

	<!-- TDU stage main engine -->

		<!-- 23, main -->

		<engine file="TDU-1-Main">
			<location unit="IN">
				<x> 0.0 </x>
				<y> 0.0 </y>
				<z> -69.96 </z>
			</location>
			<orient unit="DEG">
				<pitch> 90.00 </pitch>
				<roll>   0.00 </roll>
				<yaw>   0.00 </yaw>
			</orient>
			<feed>16</feed>
			<feed>17</feed>
			<feed>18</feed>
			<feed>19</feed>
			<thruster file="TDU-1-Main-Nozzle">
				<location unit="IN">
					<x> 0.0 </x>
					<y> 0.0 </y>
					<z> -69.96 </z>
				</location>
				<orient unit="DEG">
					<pitch> 90.00 </pitch>
					<roll>   0.00 </roll>
					<yaw>   0.00 </yaw>
				</orient>
			</thruster>
		</engine>

		<!-- 24, forward -->

		<engine file="TDU-1-Pitch">
			<location unit="IN">
				<x> -17.952 </x>
				<y> 0.0 </y>
				<z> -57.67 </z>
			</location>
			<orient unit="DEG">
				<pitch> 0.00 </pitch>
				<roll>  0.00 </roll>
				<yaw>   180.00 </yaw>
			</orient>
			<feed>16</feed>
			<feed>17</feed>
			<feed>18</feed>
			<feed>19</feed>
			<thruster file="TDU-1-Pitch-Nozzle">
				<location unit="IN">
					<x> -17.952 </x>
					<y> 0.0 </y>
					<z> -57.67 </z>
				</location>
				<orient unit="DEG">
					<pitch> 0.00 </pitch>
					<roll>  0.00 </roll>
					<yaw>   180.00 </yaw>
				</orient>
			</thruster>
		</engine>

		<!-- 25, back -->

		<engine file="TDU-1-Pitch">
			<location unit="IN">
				<x> 17.952 </x>
				<y> 0.0 </y>
				<z> -57.67 </z>
			</location>
			<orient unit="DEG">
				<pitch> 0.00 </pitch>
				<roll>  0.00 </roll>
				<yaw>   0.00 </yaw>
			</orient>
			<feed>16</feed>
			<feed>17</feed>
			<feed>18</feed>
			<feed>19</feed>
			<thruster file="TDU-1-Pitch-Nozzle">
				<location unit="IN">
					<x> 17.952 </x>
					<y> 0.0 </y>
					<z> -57.67 </z>
				</location>
				<orient unit="DEG">
					<pitch> 0.00 </pitch>
					<roll>  0.00 </roll>
					<yaw>   0.00 </yaw>
				</orient>
			</thruster>
		</engine>

		<!-- 26, left -->

		<engine file="TDU-1-Pitch">
			<location unit="IN">
				<x> 0.0 </x>
				<y> -17.952 </y>
				<z> -57.67 </z>
			</location>
			<orient unit="DEG">
				<pitch> 0.00 </pitch>
				<roll>  0.00 </roll>
				<yaw>   90.00 </yaw>
			</orient>
			<feed>16</feed>
			<feed>17</feed>
			<feed>18</feed>
			<feed>19</feed>
			<thruster file="TDU-1-Pitch-Nozzle">
				<location unit="IN">
					<x> 0.0 </x>
					<y> -17.952 </y>
					<z> -57.67 </z>
				</location>
				<orient unit="DEG">
					<pitch> 0.00 </pitch>
					<roll>  0.00 </roll>
					<yaw>   90.00 </yaw>
				</orient>
			</thruster>
		</engine>

		<!-- 27, right -->

		<engine file="TDU-1-Pitch">
			<location unit="IN">
				<x> 0.0 </x>
				<y> 17.952 </y>
				<z> -57.67 </z>
			</location>
			<orient unit="DEG">
				<pitch> 0.00 </pitch>
				<roll>  0.00 </roll>
				<yaw>   -90.00 </yaw>
			</orient>
			<feed>16</feed>
			<feed>17</feed>
			<feed>18</feed>
			<feed>19</feed>
			<thruster file="TDU-1-Pitch-Nozzle">
				<location unit="IN">
					<x> 0.0 </x>
					<y> 17.952 </y>
					<z> -57.67 </z>
				</location>
				<orient unit="DEG">
					<pitch> 0.00 </pitch>
					<roll>  0.00 </roll>
					<yaw>   -90.00 </yaw>
				</orient>
			</thruster>
		</engine>

		<!-- 28, forward left -->

		<engine file="TDU-1-Roll">
			<location unit="IN">
				<x> -15.55 </x>
				<y> -3.3 </y>
				<z> -59.76 </z>
			</location>
			<orient unit="DEG">
				<pitch> 0.00 </pitch>
				<roll>  0.00 </roll>
				<yaw>   90.00 </yaw>
			</orient>
			<feed>16</feed>
			<feed>17</feed>
			<feed>18</feed>
			<feed>19</feed>
			<thruster file="TDU-1-Roll-Nozzle">
				<location unit="IN">
					<x> -15.55 </x>
					<y> -3.3 </y>
					<z> -59.76 </z>
				</location>
				<orient unit="DEG">
					<pitch> 0.00 </pitch>
					<roll>  0.00 </roll>
					<yaw>   90.00 </yaw>
				</orient>
			</thruster>
		</engine>

		<!-- 29, back right -->

		<engine file="TDU-1-Roll">
			<location unit="IN">
				<x> 15.55 </x>
				<y> 3.3 </y>
				<z> -59.76 </z>
			</location>
			<orient unit="DEG">
				<pitch> 0.00 </pitch>
				<roll>  0.00 </roll>
				<yaw>   -90.00 </yaw>
			</orient>
			<feed>16</feed>
			<feed>17</feed>
			<feed>18</feed>
			<feed>19</feed>
			<thruster file="TDU-1-Roll-Nozzle">
				<location unit="IN">
					<x> 15.55 </x>
					<y> 3.3 </y>
					<z> -59.76 </z>
				</location>
				<orient unit="DEG">
					<pitch> 0.00 </pitch>
					<roll>  0.00 </roll>
					<yaw>   -90.00 </yaw>
				</orient>
			</thruster>
		</engine>

		<!-- 30, forward right -->

		<engine file="TDU-1-Roll">
			<location unit="IN">
				<x> -15.55 </x>
				<y> 3.3 </y>
				<z> -59.76 </z>
			</location>
			<orient unit="DEG">
				<pitch> 0.00 </pitch>
				<roll>  0.00 </roll>
				<yaw>   -90.00 </yaw>
			</orient>
			<feed>16</feed>
			<feed>17</feed>
			<feed>18</feed>
			<feed>19</feed>
			<thruster file="TDU-1-Roll-Nozzle">
				<location unit="IN">
					<x> -15.55 </x>
					<y> 3.3 </y>
					<z> -59.76 </z>
				</location>
				<orient unit="DEG">
					<pitch> 0.00 </pitch>
					<roll>  0.00 </roll>
					<yaw>   -90.00 </yaw>
				</orient>
			</thruster>
		</engine>

		<!-- 31, back left -->

		<engine file="TDU-1-Roll">
			<location unit="IN">
				<x> 15.55 </x>
				<y> -3.3 </y>
				<z> -59.76 </z>
			</location>
			<orient unit="DEG">
				<pitch> 0.00 </pitch>
				<roll>  0.00 </roll>
				<yaw>   90.00 </yaw>
			</orient>
			<feed>16</feed>
			<feed>17</feed>
			<feed>18</feed>
			<feed>19</feed>
			<thruster file="TDU-1-Roll-Nozzle">
				<location unit="IN">
					<x> 15.55 </x>
					<y> -3.3 </y>
					<z> -59.76 </z>
				</location>
				<orient unit="DEG">
					<pitch> 0.00 </pitch>
					<roll>  0.00 </roll>
					<yaw>   90.00 </yaw>
				</orient>
			</thruster>
		</engine>

		<!-- Main engine tanks-->

		<tank type="OXIDIZER" number="16">
			<location unit="IN">
				<x> -10.19 </x>
				<y> 0.0 </y>
				<z> -47.51 </z>
			</location>
			<capacity unit="LBS"> 250.00 </capacity>
		<!--	<contents unit="LBS"> 242.50 </contents> -->
			<contents unit="LBS"> 0.10 </contents>
			<density unit="KG/L"> 13.394 </density>
		</tank>

		<tank type="OXIDIZER" number="17">
			<location unit="IN">
				<x> 10.19 </x>
				<y> 0.0 </y>
				<z> -47.51 </z>
			</location>
			<capacity unit="LBS"> 250.00 </capacity>
		<!--	<contents unit="LBS"> 242.50 </contents> -->
			<contents unit="LBS"> 0.10 </contents>
			<density unit="KG/L"> 13.394 </density>
		</tank>

		<tank type="FUEL" number="18">
			<location unit="IN">
				<x> -10.19 </x>
				<y> 0.00 </y>
				<z> -33.89 </z>
			</location>
			<capacity unit="LBS"> 70.00 </capacity>
		<!--	<contents unit="LBS"> 66.13 </contents> -->
			<contents unit="LBS"> 0.10 </contents>
			<density unit="LBS/GAL"> 9.764 </density>
		</tank>

		<tank type="FUEL" number="19">
			<location unit="IN">
				<x> 10.19 </x>
				<y> 0.00 </y>
				<z> -33.89 </z>
			</location>
			<capacity unit="LBS"> 70.00 </capacity>
		<!--	<contents unit="LBS"> 66.13 </contents> -->
			<contents unit="LBS"> 0.10 </contents>
			<density unit="LBS/GAL"> 9.764 </density>
		</tank>

	<!-- TDU stage maneur engines -->

		<!-- 32, maneur forward -->

		<engine file="TDU-1-Maneur">
			<location unit="IN">
				<x> -55.0 </x>
				<y> 0.0 </y>
				<z> -21.57 </z>
			</location>
			<orient unit="DEG">
				<pitch> -53.97 </pitch>
				<roll>  0.00 </roll>
				<yaw>   180.00 </yaw>
			</orient>
			<feed>20</feed>
			<feed>21</feed>
			<feed>22</feed>
			<feed>23</feed>
			<feed>24</feed>
			<feed>25</feed>
			<thruster file="TDU-1-Maneur-Nozzle">
				<location unit="IN">
					<x> -55.0 </x>
					<y> 0.0 </y>
					<z> -21.57 </z>
				</location>
				<orient unit="DEG">
					<pitch> -53.97 </pitch>
					<roll>  0.00 </roll>
					<yaw>   180.00 </yaw>
				</orient>
			</thruster>
		</engine>

		<!-- 33, maneur back -->

		<engine file="TDU-1-Maneur">
			<location unit="IN">
				<x> 55.0 </x>
				<y> 0.0 </y>
				<z> -21.57 </z>
			</location>
			<orient unit="DEG">
				<pitch> -53.97 </pitch>
				<roll>   0.00 </roll>
				<yaw>   0.00 </yaw>
			</orient>
			<feed>20</feed>
			<feed>21</feed>
			<feed>22</feed>
			<feed>23</feed>
			<feed>24</feed>
			<feed>25</feed>
			<thruster file="TDU-1-Maneur-Nozzle">
				<location unit="IN">
					<x> 55.0 </x>
					<y> 0.0 </y>
					<z> -21.57 </z>
				</location>
				<orient unit="DEG">
					<pitch> -53.97 </pitch>
					<roll>  0.00 </roll>
					<yaw>   0.00 </yaw>
				</orient>
			</thruster>
		</engine>

		<!-- 34, maneur left -->

		<engine file="TDU-1-Maneur">
			<location unit="IN">
				<x> 0.0 </x>
				<y> -47.28 </y>
				<z> -23.58 </z>
			</location>
			<orient unit="DEG">
				<pitch> -53.97 </pitch>
				<roll>  0.00 </roll>
				<yaw>   90.00 </yaw>
			</orient>
			<feed>20</feed>
			<feed>21</feed>
			<feed>22</feed>
			<feed>23</feed>
			<feed>24</feed>
			<feed>25</feed>
			<thruster file="TDU-1-Maneur-Nozzle">
				<location unit="IN">
					<x> 0.0 </x>
					<y> -47.28 </y>
					<z> -23.58 </z>
				</location>
				<orient unit="DEG">
					<pitch> -53.97 </pitch>
					<roll>  0.00 </roll>
					<yaw>   90.00 </yaw>
				</orient>
			</thruster>
		</engine>

		<!-- 35, maneur right -->

		<engine file="TDU-1-Maneur">
			<location unit="IN">
				<x> 0.0 </x>
				<y> 47.28 </y>
				<z> -23.58 </z>
			</location>
			<orient unit="DEG">
				<pitch> -53.97 </pitch>
				<roll>  0.00 </roll>
				<yaw>   -90.00 </yaw>
			</orient>
			<feed>20</feed>
			<feed>21</feed>
			<feed>22</feed>
			<feed>23</feed>
			<feed>24</feed>
			<feed>25</feed>
			<thruster file="TDU-1-Maneur-Nozzle">
				<location unit="IN">
					<x> 0.0 </x>
					<y> 47.28 </y>
					<z> -23.58 </z>
				</location>
				<orient unit="DEG">
					<pitch> -53.97 </pitch>
					<roll>  0.00 </roll>
					<yaw>   -90.00 </yaw>
				</orient>
			</thruster>
		</engine>

		<!-- 36, maneur roll forward left -->

		<engine file="TDU-1-Maneur">
			<location unit="IN">
				<x> -29.6 </x>
				<y> -34.21 </y>
				<z> -7.59 </z>
			</location>
			<orient unit="DEG">
				<pitch> 0.0 </pitch>
				<roll>  0.00 </roll>
				<yaw>   45.00 </yaw>
			</orient>
			<feed>20</feed>
			<feed>21</feed>
			<feed>22</feed>
			<feed>23</feed>
			<feed>24</feed>
			<feed>25</feed>
			<thruster file="TDU-1-Maneur-Nozzle">
				<location unit="IN">
					<x> -29.6 </x>
					<y> -34.21 </y>
					<z> -7.59 </z>
				</location>
				<orient unit="DEG">
					<pitch> 0.0 </pitch>
					<roll>  0.00 </roll>
					<yaw>   45.00 </yaw>
				</orient>
			</thruster>
		</engine>

		<!-- 37, maneur roll back right -->

		<engine file="TDU-1-Maneur">
			<location unit="IN">
				<x> 29.6 </x>
				<y> 34.21 </y>
				<z> -7.59 </z>
			</location>
			<orient unit="DEG">
				<pitch> 0.0 </pitch>
				<roll>  0.00 </roll>
				<yaw>   -135.00 </yaw>
			</orient>
			<feed>20</feed>
			<feed>21</feed>
			<feed>22</feed>
			<feed>23</feed>
			<feed>24</feed>
			<feed>25</feed>
			<thruster file="TDU-1-Maneur-Nozzle">
				<location unit="IN">
					<x> 29.6 </x>
					<y> 34.21 </y>
					<z> -7.59 </z>
				</location>
				<orient unit="DEG">
					<pitch> 0.0 </pitch>
					<roll>  0.00 </roll>
					<yaw>   -135.00 </yaw>
				</orient>
			</thruster>
		</engine>

		<!-- 38, maneur roll forward right -->

		<engine file="TDU-1-Maneur">
			<location unit="IN">
				<x> -29.6 </x>
				<y> 34.21 </y>
				<z> -7.59 </z>
			</location>
			<orient unit="DEG">
				<pitch> 0.0 </pitch>
				<roll>  0.00 </roll>
				<yaw>   -45.00 </yaw>
			</orient>
			<feed>20</feed>
			<feed>21</feed>
			<feed>22</feed>
			<feed>23</feed>
			<feed>24</feed>
			<feed>25</feed>
			<thruster file="TDU-1-Maneur-Nozzle">
				<location unit="IN">
					<x> -29.6 </x>
					<y> 34.21 </y>
					<z> -7.59 </z>
				</location>
				<orient unit="DEG">
					<pitch> 0.0 </pitch>
					<roll>  0.00 </roll>
					<yaw>   -45.00 </yaw>
				</orient>
			</thruster>
		</engine>

		<!-- 39, maneur roll back left -->

		<engine file="TDU-1-Maneur">
			<location unit="IN">
				<x> 29.6 </x>
				<y> -34.21 </y>
				<z> -7.59 </z>
			</location>
			<orient unit="DEG">
				<pitch> 0.0 </pitch>
				<roll>  0.00 </roll>
				<yaw>   135.00 </yaw>
			</orient>
			<feed>20</feed>
			<feed>21</feed>
			<feed>22</feed>
			<feed>23</feed>
			<feed>24</feed>
			<feed>25</feed>
			<thruster file="TDU-1-Maneur-Nozzle">
				<location unit="IN">
					<x> 29.6 </x>
					<y> -34.21 </y>
					<z> -7.59 </z>
				</location>
				<orient unit="DEG">
					<pitch> 0.0 </pitch>
					<roll>  0.00 </roll>
					<yaw>   135.00 </yaw>
				</orient>
			</thruster>
		</engine>

		<tank type="OXIDIZER" number="20">
			<location unit="IN">
				<x> -40.55 </x>
				<y> 0.0 </y>
				<z> 4.251 </z>
			</location>
			<capacity unit="LBS"> 20.00 </capacity>
			<contents unit="LBS"> 0.10 </contents>
			<density unit="KG/L"> 6.76 </density>
		</tank>

		<tank type="FUEL" number="21">
			<location unit="IN">
				<x> 40.55 </x>
				<y> 0.0 </y>
				<z> 4.251 </z>
			</location>
			<capacity unit="LBS"> 20.00 </capacity>
			<contents unit="LBS"> 0.10 </contents>
			<density unit="KG/L"> 6.76 </density>
		</tank>

		<tank type="OXIDIZER" number="22">
			<location unit="IN">
				<x> 0.0 </x>
				<y> -40.55 </y>
				<z> 4.251 </z>
			</location>
			<capacity unit="LBS"> 20.00 </capacity>
			<contents unit="LBS"> 0.10 </contents>
			<density unit="LBS/GAL"> 6.76 </density>
		</tank>

		<tank type="FUEL" number="23">
			<location unit="IN">
				<x> 0.0 </x>
				<y> 40.55 </y>
				<z> 4.251 </z>
			</location>
			<capacity unit="LBS"> 20.00 </capacity>
			<contents unit="LBS"> 0.10 </contents>
			<density unit="LBS/GAL"> 6.76 </density>
		</tank>

		<tank type="OXIDIZER" number="24">
			<location unit="IN">
				<x> 0.0 </x>
				<y> -40.55 </y>
				<z> 4.251 </z>
			</location>
			<capacity unit="LBS"> 20.00 </capacity>
			<contents unit="LBS"> 0.10 </contents>
			<density unit="LBS/GAL"> 6.76 </density>
		</tank>

		<tank type="FUEL" number="25">
			<location unit="IN">
				<x> 0.0 </x>
				<y> 40.55 </y>
				<z> 4.251 </z>
			</location>
			<capacity unit="LBS"> 20.00 </capacity>
			<contents unit="LBS"> 0.10 </contents>
			<density unit="LBS/GAL"> 6.76 </density>
		</tank>

	<!-- Spacecraft brake engines -->

		<!-- 40, main -->

		<engine file="Soft-Landing">
			<location unit="IN">
				<x> 0.0 </x>
				<y> 0.0 </y>
				<z> 90.19 </z>
			</location>
			<orient unit="DEG">
				<pitch> 90.00 </pitch>
				<roll>   0.00 </roll>
				<yaw>   0.00 </yaw>
			</orient>
			<feed>26</feed>
			<feed>27</feed>
			<thruster file="Soft-Landing-Nozzle">
				<location unit="IN">
					<x> 0.0 </x>
					<y> 0.0 </y>
					<z> 90.19 </z>
				</location>
				<orient unit="DEG">
					<pitch> 90.00 </pitch>
					<roll>   0.00 </roll>
					<yaw>   0.00 </yaw>
				</orient>
			</thruster>
		</engine>

		<tank type="OXIDIZER" number="26">
			<location unit="IN">
				<x> 0.0 </x>
				<y> 0.0 </y>
				<z> 90.19 </z>
			</location>
			<capacity unit="LBS"> 59.52 </capacity>
			<contents unit="LBS"> 0.10 </contents>
			<density unit="LBS/GAL"> 7.51 </density>
		</tank>

		<tank type="FUEL" number="27">
			<location unit="IN">
				<x> 0.0 </x>
				<y> 0.0 </y>
				<z> 90.19 </z>
			</location>
			<capacity unit="LBS"> 59.52 </capacity>
			<contents unit="LBS"> 0.10 </contents>
			<density unit="LBS/GAL"> 7.51 </density>
		</tank>

	</propulsion>

	<ground_reactions>

	<!-- Wait of carrier with full load is 623935lbs
		only 4 points contact ground, so it's 623935/4=155983lbs for each point
			spring_coeff=*~1.1=171582.125 to make good contact by experiment
			damping_coeff=*~0.55=85791.0625 to make good contact by experiment
		damping_coeff_rebound=1 to make good contact by experiment
  -->

		<!-- 0 -->
		<contact type="STRUCTURE" name="FORWARD">
			<location unit="M">
				<x> -6.0 </x>
				<y> 0.0 </y>
<!--				<z> -14.252 </z>	-->
				<z> -15.5 </z>
			</location>
			<static_friction>  0.80 </static_friction>
			<dynamic_friction> 0.80 </dynamic_friction>
			<rolling_friction> 0.80 </rolling_friction>
<!--			<spring_coeff unit="LBS/FT">      140385.375 </spring_coeff>	-->
			<spring_coeff unit="LBS/FT">      75000.0 </spring_coeff>
			<damping_coeff unit="LBS/FT/SEC"> 46795.125 </damping_coeff>
			<damping_coeff_rebound unit="LBS/FT/SEC"> 46795.125 </damping_coeff_rebound>
			<spring_coeff unit="LBS/FT">      75000 </spring_coeff>
			<damping_coeff unit="LBS/FT/SEC"> 75000 </damping_coeff>
			<damping_coeff_rebound unit="LBS/FT/SEC"> 75000 </damping_coeff_rebound>
			<max_steer unit="DEG"> 0.00 </max_steer>
			<brake_group>CENTER</brake_group>
			<retractable>1</retractable>
		</contact>

		<!-- 1 -->
		<contact type="STRUCTURE" name="BACK">
			<location unit="M">
				<x> 6.0 </x>
				<y> 0.0 </y>
				<z> -15.5 </z>
			</location>
			<static_friction>  0.80 </static_friction>
			<dynamic_friction> 0.80 </dynamic_friction>
			<rolling_friction> 0.80 </rolling_friction>
			<spring_coeff unit="LBS/FT">      75000.0 </spring_coeff>
			<damping_coeff unit="LBS/FT/SEC"> 46795.125 </damping_coeff>
			<damping_coeff_rebound unit="LBS/FT/SEC"> 46795.125 </damping_coeff_rebound>
			<max_steer unit="DEG"> 0.00 </max_steer>
			<brake_group>CENTER</brake_group>
			<retractable>1</retractable>
		</contact>

		<!-- 2 -->
		<contact type="STRUCTURE" name="LEFT">
			<location unit="M">
				<x> 0.0 </x>
				<y> -6.0 </y>
				<z> -15.5 </z>
			</location>
			<static_friction>  0.80 </static_friction>
			<dynamic_friction> 0.80 </dynamic_friction>
			<rolling_friction> 0.80 </rolling_friction>
			<spring_coeff unit="LBS/FT">      75000.0 </spring_coeff>
			<damping_coeff unit="LBS/FT/SEC"> 46795.125 </damping_coeff>
			<damping_coeff_rebound unit="LBS/FT/SEC"> 46795.125 </damping_coeff_rebound>
			<max_steer unit="DEG"> 0.00 </max_steer>
			<brake_group>CENTER</brake_group>
			<retractable>1</retractable>
		</contact>

		<!-- 3 -->
		<contact type="STRUCTURE" name="RIGHT">
			<location unit="M">
				<x> 0.0 </x>
				<y> 6.0 </y>
				<z> -15.5 </z>
			</location>
			<static_friction>  0.80 </static_friction>
			<dynamic_friction> 0.80 </dynamic_friction>
			<rolling_friction> 0.80 </rolling_friction>
			<spring_coeff unit="LBS/FT">      75000.0 </spring_coeff>
			<damping_coeff unit="LBS/FT/SEC"> 46795.125 </damping_coeff>
			<damping_coeff_rebound unit="LBS/FT/SEC"> 46795.125 </damping_coeff_rebound>
			<max_steer unit="DEG"> 0.00 </max_steer>
			<brake_group>CENTER</brake_group>
			<retractable>1</retractable>
		</contact>

	<!-- Wait of spacecraft is 5500lbs
		only 3 points contact ground, so it's 5500/3=1833lbs for each point
			spring_coeff=*~1.1 to make good contact by experiment
			damping_coeff=*~0.55 to make good contact by experiment
		damping_coeff_rebound=1 to make good contact by experiment
  -->


		<!-- 4 -->
		<contact type="STRUCTURE" name="POINT_0">
			<location unit="M">
				<x>	-1.426915 </x>
				<y>	0 </y>
				<z>	0 </z>
			</location>
			<static_friction>  0.80 </static_friction>
			<dynamic_friction> 0.50 </dynamic_friction>
			<rolling_friction> 0.02 </rolling_friction>
			<spring_coeff unit="LBS/FT">       1650.00 </spring_coeff>
			<damping_coeff unit="LBS/FT/SEC">   550.00 </damping_coeff>
			<brake_group>CENTER</brake_group>
			<retractable>0</retractable>
		</contact>

		<!-- 5 -->
		<contact type="STRUCTURE" name="POINT_1">
			<location unit="M">
				<x>	-0.638138 </x>
				<y>	0.750158 </y>
				<z>	1.032559 </z>
			</location>
			<static_friction>  0.80 </static_friction>
			<dynamic_friction> 0.50 </dynamic_friction>
			<rolling_friction> 0.02 </rolling_friction>
			<spring_coeff unit="LBS/FT">       1650.00 </spring_coeff>
			<damping_coeff unit="LBS/FT/SEC">   550.00 </damping_coeff>
			<brake_group>CENTER</brake_group>
			<retractable>0</retractable>
		</contact>

		<!-- 6 -->
		<contact type="STRUCTURE" name="POINT_2">
			<location unit="M">
				<x>	-0.638138 </x>
				<y>	1.213791 </y>
				<z>	-0.394334 </z>
			</location>
			<static_friction>  0.80 </static_friction>
			<dynamic_friction> 0.50 </dynamic_friction>
			<rolling_friction> 0.02 </rolling_friction>
			<spring_coeff unit="LBS/FT">       1650.00 </spring_coeff>
			<damping_coeff unit="LBS/FT/SEC">   550.00 </damping_coeff>
			<brake_group>CENTER</brake_group>
			<retractable>0</retractable>
		</contact>

		<!-- 7 -->
		<contact type="STRUCTURE" name="POINT_3">
			<location unit="M">
				<x>	-0.638138 </x>
				<y>	0 </y>
				<z>	-1.276224 </z>
			</location>
			<static_friction>  0.80 </static_friction>
			<dynamic_friction> 0.50 </dynamic_friction>
			<rolling_friction> 0.02 </rolling_friction>
			<spring_coeff unit="LBS/FT">       1650.00 </spring_coeff>
			<damping_coeff unit="LBS/FT/SEC">   550.00 </damping_coeff>
			<brake_group>CENTER</brake_group>
			<retractable>0</retractable>
		</contact>

		<!-- 8 -->
		<contact type="STRUCTURE" name="POINT_4">
			<location unit="M">
				<x>	-0.638138 </x>
				<y>	-1.213791 </y>
				<z>	-0.394334 </z>
			</location>
			<static_friction>  0.80 </static_friction>
			<dynamic_friction> 0.50 </dynamic_friction>
			<rolling_friction> 0.02 </rolling_friction>
			<spring_coeff unit="LBS/FT">       1650.00 </spring_coeff>
			<damping_coeff unit="LBS/FT/SEC">   550.00 </damping_coeff>
			<brake_group>CENTER</brake_group>
			<retractable>0</retractable>
		</contact>

		<!-- 9 -->
		<contact type="STRUCTURE" name="POINT_5">
			<location unit="M">
				<x>	-0.638138 </x>
				<y>	-0.750158 </y>
				<z>	1.032559 </z>
			</location>
			<static_friction>  0.80 </static_friction>
			<dynamic_friction> 0.50 </dynamic_friction>
			<rolling_friction> 0.02 </rolling_friction>
			<spring_coeff unit="LBS/FT">       1650.00 </spring_coeff>
			<damping_coeff unit="LBS/FT/SEC">   550.00 </damping_coeff>
			<brake_group>CENTER</brake_group>
			<retractable>0</retractable>
		</contact>

		<!-- 10 -->
		<contact type="STRUCTURE" name="POINT_6">
			<location unit="M">
				<x>	0.638138 </x>
				<y>	1.213791 </y>
				<z>	0.394421 </z>
			</location>
			<static_friction>  0.80 </static_friction>
			<dynamic_friction> 0.50 </dynamic_friction>
			<rolling_friction> 0.02 </rolling_friction>
			<spring_coeff unit="LBS/FT">       1650.00 </spring_coeff>
			<damping_coeff unit="LBS/FT/SEC">   550.00 </damping_coeff>
			<brake_group>CENTER</brake_group>
			<retractable>0</retractable>
		</contact>

		<!-- 11 -->
		<contact type="STRUCTURE" name="POINT_7">
			<location unit="M">
				<x>	0.638138 </x>
				<y>	0.750158 </y>
				<z>	-1.032472 </z>
			</location>
			<static_friction>  0.80 </static_friction>
			<dynamic_friction> 0.50 </dynamic_friction>
			<rolling_friction> 0.02 </rolling_friction>
			<spring_coeff unit="LBS/FT">       1650.00 </spring_coeff>
			<damping_coeff unit="LBS/FT/SEC">   550.00 </damping_coeff>
			<brake_group>CENTER</brake_group>
			<retractable>0</retractable>
		</contact>

		<!-- 12 -->
		<contact type="STRUCTURE" name="POINT_8">
			<location unit="M">
				<x>	0.638138 </x>
				<y>	-0.750158 </y>
				<z>	-1.032472 </z>
			</location>
			<static_friction>  0.80 </static_friction>
			<dynamic_friction> 0.50 </dynamic_friction>
			<rolling_friction> 0.02 </rolling_friction>
			<spring_coeff unit="LBS/FT">       1650.00 </spring_coeff>
			<damping_coeff unit="LBS/FT/SEC">   550.00 </damping_coeff>
			<brake_group>CENTER</brake_group>
			<retractable>0</retractable>
		</contact>

		<!-- 13 -->
		<contact type="STRUCTURE" name="POINT_9">
			<location unit="M">
				<x>	0.638138 </x>
				<y>	-1.213791 </y>
				<z>	0.394421 </z>
			</location>
			<static_friction>  0.80 </static_friction>
			<dynamic_friction> 0.50 </dynamic_friction>
			<rolling_friction> 0.02 </rolling_friction>
			<spring_coeff unit="LBS/FT">       1650.00 </spring_coeff>
			<damping_coeff unit="LBS/FT/SEC">   550.00 </damping_coeff>
			<brake_group>CENTER</brake_group>
			<retractable>0</retractable>
		</contact>

		<!-- 14 -->
		<contact type="STRUCTURE" name="POINT_10">
			<location unit="M">
				<x>	0.638138 </x>
				<y>	0 </y>
				<z>	-1.276312 </z>
			</location>
			<static_friction>  0.80 </static_friction>
			<dynamic_friction> 0.50 </dynamic_friction>
			<rolling_friction> 0.02 </rolling_friction>
			<spring_coeff unit="LBS/FT">       1650.00 </spring_coeff>
			<damping_coeff unit="LBS/FT/SEC">   550.00 </damping_coeff>
			<brake_group>CENTER</brake_group>
			<retractable>0</retractable>
		</contact>

		<!-- 15 -->
		<contact type="STRUCTURE" name="POINT_11">
			<location unit="M">
				<x>	1.426915 </x>
				<y>	0 </y>
				<z>	0 </z>
			</location>
			<static_friction>  0.80 </static_friction>
			<dynamic_friction> 0.50 </dynamic_friction>
			<rolling_friction> 0.02 </rolling_friction>
			<spring_coeff unit="LBS/FT">       1650.00 </spring_coeff>
			<damping_coeff unit="LBS/FT/SEC">   550.00 </damping_coeff>
			<brake_group>CENTER</brake_group>
			<retractable>0</retractable>
		</contact>

	</ground_reactions>

	<flight_control name="FCS: Vostok-1">

		<channel name="Pitch">

			<kinematic name="Pitch Cmd Delayed">
				<input>stages/unit[0]/control/pitch-cmd-norm</input>
				<traverse>
				<setting>
					<position>-1.0</position>
					<time>0</time>
				</setting>
				<setting>
					<position>1.0</position>
					<time>0.01</time>
				</setting>
				</traverse>
				<output>stages/unit[0]/elevator-delayed-norm</output>
			</kinematic>

			<summer name="Pitch Trim Sum">
				<input>stages/unit[0]/elevator-delayed-norm</input>
				<input>fcs/pitch-trim-cmd-norm</input>
				<clipto>
					<min> -1 </min>
					<max>  1 </max>
				</clipto>
			</summer>

			<aerosurface_scale name="Elevator Control">
				<input>fcs/pitch-trim-sum</input>
				<range>
					<min> -0.7853 </min>
					<max>  0.7853 </max>
				</range>
				<output>fcs/elevator-pos-rad</output>
			</aerosurface_scale>

			<aerosurface_scale name="elevator normalization">
				<input>fcs/elevator-pos-rad</input>
				<domain>
					<min> -0.7853 </min>
					<max>  0.7853 </max>
				</domain>
				<range>
					<min> -1 </min>
					<max>  1 </max>
				</range>
				<output>fcs/elevator-pos-norm</output>
			</aerosurface_scale>

		</channel>

		<channel name="Roll">

			<summer name="Roll Trim Sum">
				<input>fcs/aileron-cmd-norm</input>
				<input>fcs/roll-trim-cmd-norm</input>
				<clipto>
					<min> -1 </min>
					<max>  1 </max>
				</clipto>
			</summer>

			<aerosurface_scale name="Left Aileron Control">
				<input>fcs/roll-trim-sum</input>
				<range>
					<min> -0.35 </min>
					<max>  0.35 </max>
				</range>
				<output>fcs/left-aileron-pos-rad</output>
			</aerosurface_scale>

			<aerosurface_scale name="Right Aileron Control">
				<input>fcs/roll-trim-sum</input>
				<range>
					<min> -0.35 </min>
					<max>  0.35 </max>
				</range>
				<output>fcs/right-aileron-pos-rad</output>
			</aerosurface_scale>

			<aerosurface_scale name="left aileron normalization">
				<input>fcs/left-aileron-pos-rad</input>
				<domain>
					<min> -0.35 </min>
					<max>  0.35 </max>
				</domain>
				<range>
					<min> -1 </min>
					<max>  1 </max>
				</range>
				<output>fcs/left-aileron-pos-norm</output>
			</aerosurface_scale>

			<aerosurface_scale name="right aileron normalization">
				<input>fcs/right-aileron-pos-rad</input>
				<domain>
					<min> -0.35 </min>
					<max>  0.35 </max>
				</domain>
				<range>
					<min> -1 </min>
					<max>  1 </max>
				</range>
				<output>fcs/right-aileron-pos-norm</output>
			</aerosurface_scale>

		</channel>

		<channel name="Yaw">

			<kinematic name="Yaw Cmd Delayed">
				<input>stages/unit[0]/control/yaw-cmd-norm</input>
				<traverse>
				<setting>
					<position>-1.0</position>
					<time>0</time>
				</setting>
				<setting>
					<position>1.0</position>
					<time>0.01</time>
				</setting>
				</traverse>
				<output>stages/unit[0]/rudder-delayed-norm</output>
			</kinematic>

			<summer name="Rudder Command Sum">
				<input>stages/unit[0]/rudder-delayed-norm</input>
				<input>fcs/yaw-trim-cmd-norm</input>
				<clipto>
					<min> -0.35 </min>
					<max>  0.35 </max>
				</clipto>
			</summer>

			<aerosurface_scale name="Rudder Control">
				<input>fcs/rudder-command-sum</input>
				<range>
					<min> -0.35 </min>
					<max>  0.35 </max>
				</range>
				<output>fcs/rudder-pos-rad</output>
			</aerosurface_scale>

			<aerosurface_scale name="rudder normalization">
				<input>fcs/rudder-pos-rad</input>
				<domain>
					<min> -0.35 </min>
					<max>  0.35 </max>
				</domain>
				<range>
					<min> -1 </min>
					<max>  1 </max>
				</range>
				<output>fcs/rudder-pos-norm</output>
			</aerosurface_scale>

		</channel>

		<channel name="Flaps">
			<kinematic name="Flaps Control">
			<input>fcs/flap-cmd-norm</input>
				<traverse>
					<setting>
						<position>  0 </position>
						<time>      0 </time>
					</setting>
					<setting>
						<position> 15 </position>
						<time>      4 </time>
					</setting>
					<setting>
						<position> 30 </position>
						<time>      3 </time>
					</setting>
					</traverse>
				<output>fcs/flap-pos-deg</output>
			</kinematic>

			<aerosurface_scale name="flap normalization">
				<input>fcs/flap-pos-deg</input>
				<domain>
						<min>  0 </min>
						<max> 30 </max>
				</domain>
				<range>
						<min> 0 </min>
						<max> 1 </max>
				</range>
				<output>fcs/flap-pos-norm</output>
			</aerosurface_scale>

		</channel>

<!--

		<channel name="Landing Gear">

			<kinematic name="Gear Control">
				<input>gear/gear-cmd-norm</input>
				<traverse>
					<setting>
						<position> 0 </position>
						<time>     0 </time>
					</setting>
					<setting>
						<position> 1 </position>
						<time>     5 </time>
					</setting>
				</traverse>
				<output>gear/gear-pos-norm</output>
			</kinematic>

		</channel>

-->

		<channel name="Speedbrake">

			<kinematic name="Speedbrake Control">
				<input>fcs/speedbrake-cmd-norm</input>
				<traverse>
					<setting>
						<position> 0 </position>
						<time>     0 </time>
					</setting>
					<setting>
						<position> 1 </position>
						<time>     1 </time>
					</setting>
				</traverse>
				<output>fcs/speedbrake-pos-norm</output>
			</kinematic>

		</channel>

		<channel name="Additional aerodinamic calculations">

		<!-- It's needed to recalculate alfa because rocked oriented vertically -->
			<fcs_function name="calculations/aero/alpha-rotated-rad">
			<function>
				<sum>
					<property>aero/alpha-rad</property>
					<value>1.57079632679489661923</value>
				</sum>
			</function>
				<output>aero/alpha-rotated-rad</output>
			</fcs_function>

		<!-- Atmosphere ends on 100km to allow flight in standart FG space.
			That modifier gotta be removed on FG space expansion to altitudes > 150km,
			and all qbar-modified-psf gotta be changed to qbar-psf then-->
			<fcs_function name="calculations/aero/qbar-modified-psf">
			<function>
				<abs>
					<product>
						<property>aero/qbar-psf</property>
						<table>
							<independentVar lookup="row">position/h-agl-ft</independentVar>
							<tableData>
								0.0		1.0
								246062.0	1.0
								328083.0	0.0001
							</tableData>
						</table>
					</product>
				</abs>
			</function>
				<output>aero/qbar-modified-psf</output>
			</fcs_function>

			<fcs_function name="aero/qbar-modified-kgm2">
			<function>
				<quotient>
					<product>
						<property>aero/qbar-modified-psf</property>
						<value>0.45359237</value>
					</product>
					<product>
						<value>0.3048</value>
						<value>0.3048</value>
					</product>
				</quotient>
			</function>
				<output>aero/qbar-modified-kgm2</output>
			</fcs_function>

		<!--Stages switches used to switch on/off aerodinamics coefficients-->

			<switch name="First Stage Switch">
				<default value="0"/>
				<test logic="AND" value="1">
					stages/unit[0]/active eq 1.0
				</test>
				<output>stages/first</output>
			</switch>

			<switch name="Second Stage Switch">
				<default value="0"/>
				<test logic="AND" value="1">
					stages/unit[0]/active eq 0.0
					stages/unit[2]/active eq 1.0
				</test>
				<output>stages/second</output>
			</switch>

			<switch name="Third Stage Switch">
				<default value="0"/>
				<test logic="AND" value="1">
					stages/unit[3]/active eq 1.0
				</test>
				<output>stages/third</output>
			</switch>

			<switch name="TDU Stage Switch">
				<default value="0"/>
				<test logic="AND" value="1">
				stages/unit[4]/active eq 1.0
				</test>
				<output>stages/tdu</output>
			</switch>

			<switch name="Spacecraft Stage Switch">
				<default value="0"/>
				<test logic="AND" value="1">
					stages/unit[5]/active eq 1.0
				</test>
				<output>stages/spacecraft</output>
			</switch>

		<!--Main metric swiches due to stage change-->

			<switch name="Wing Area">
				<default value="0"/>
				<test logic="AND" value="47.3769">
					stages/unit[0]/active eq 1.0
				</test>
				<test logic="AND" value="16.7884">
					stages/unit[0]/active eq 0.0
					stages/unit[2]/active eq 1.0
				</test>
				<test logic="AND" value="12.6839">
					stages/unit[3]/active eq 1.0
				</test>
				<test logic="AND" value="10.7375">
					stages/unit[4]/active eq 1.0
				</test>
				<test logic="AND" value="9.4240">
					stages/unit[5]/active eq 1.0
				</test>
				<output>metrics/Sw-sqft</output>
			</switch>

			<switch name="Wing Span">
				<default value="0"/>
				<test logic="AND" value="16.2">
					stages/unit[0]/active eq 1.0
				</test>
				<test logic="AND" value="9.2320">
					stages/unit[0]/active eq 0.0
					stages/unit[2]/active eq 1.0
				</test>
				<test logic="AND" value="9.5260">
					stages/unit[3]/active eq 1.0
				</test>
				<test logic="AND" value="9.0080">
					stages/unit[4]/active eq 1.0
				</test>
				<test logic="AND" value="7.9060">
					stages/unit[5]/active eq 1.0
				</test>
				<output>metrics/bw-ft</output>
			</switch>

			<switch name="Wing Chord">
				<default value="0"/>
				<test logic="AND" value="3.1342">
					stages/unit[0]/active eq 1.0
				</test>
				<test logic="AND" value="1.9555">
					stages/unit[0]/active eq 0.0
					stages/unit[2]/active eq 1.0
				</test>
				<test logic="AND" value="1.6391">
					stages/unit[3]/active eq 1.0
				</test>
				<test logic="AND" value="1.4991">
					stages/unit[4]/active eq 1.0
				</test>
				<test logic="AND" value="1.4991">
					stages/unit[5]/active eq 1.0
				</test>
				<output>metrics/cbarw-ft</output>
			</switch>

			<switch name="Horisontal Tail Area">
				<default value="0"/>
				<test logic="AND" value="255.7538">
					stages/unit[0]/active eq 1.0
				</test>
				<test logic="AND" value="23.9440">
					stages/unit[0]/active eq 0.0
					stages/unit[2]/active eq 1.0
				</test>
				<test logic="AND" value="12.6839">
					stages/unit[3]/active eq 1.0
				</test>
				<test logic="AND" value="1.6728">
					stages/unit[4]/active eq 1.0
				</test>
				<test logic="AND" value="1.8174">
					stages/unit[5]/active eq 1.0
				</test>
				<output>metrics/Sh-sqft</output>
			</switch>

			<switch name="Horisontal Tail Arm">
				<default value="0"/>
				<test logic="AND" value="9.6840">
					stages/unit[0]/active eq 1.0
				</test>
				<test logic="AND" value="5.0283">
					stages/unit[0]/active eq 0.0
					stages/unit[2]/active eq 1.0
				</test>
				<test logic="AND" value="2.7384">
					stages/unit[3]/active eq 1.0
				</test>
				<test logic="AND" value="1.3452">
					stages/unit[4]/active eq 1.0
				</test>
				<test logic="AND" value="1.2394">
					stages/unit[5]/active eq 1.0
				</test>
				<output>metrics/lh-ft</output>
			</switch>

			<switch name="Vertical Tail Area">
				<default value="0"/>
				<test logic="AND" value="127.8769">
					stages/unit[0]/active eq 1.0
				</test>
				<test logic="AND" value="11.9720">
					stages/unit[0]/active eq 0.0
					stages/unit[2]/active eq 1.0
				</test>
				<test logic="AND" value="6.3419">
					stages/unit[3]/active eq 1.0
				</test>
				<test logic="AND" value="0.8364">
					stages/unit[4]/active eq 1.0
				</test>
				<test logic="AND" value="0.9087">
					stages/unit[5]/active eq 1.0
				</test>
				<output>metrics/Sh-sqft</output>
			</switch>

			<switch name="Vertical Tail Arm">
				<default value="0"/>
				<test logic="AND" value="9.6840">
					stages/unit[0]/active eq 1.0
				</test>
				<test logic="AND" value="5.0283">
					stages/unit[0]/active eq 0.0
					stages/unit[2]/active eq 1.0
				</test>
				<test logic="AND" value="2.7384">
					stages/unit[3]/active eq 1.0
				</test>
				<test logic="AND" value="1.3452">
					stages/unit[4]/active eq 1.0
				</test>
				<test logic="AND" value="1.2394">
					stages/unit[5]/active eq 1.0
				</test>
				<output>metrics/lh-ft</output>
			</switch>

		</channel>

	</flight_control>

	<external_reactions>

		<force name="Brake-Chute" frame="WIND">
			<function>
				<product>
					<property>aero/qbar-modified-psf</property>
					<property>metrics/Sw-sqft</property>
					<value>6.173</value>
					<pow>
						<property>systems/spacecraft/brake-chute-pos-norm</property>
						<value>2.0</value>
					</pow>
					<difference>
						<value>1</value>
						<property>systems/spacecraft/brake-chute-dropped</property>
					</difference>
					<difference>
						<value>1</value>
						<property>systems/spacecraft/brake-chute-teared</property>
					</difference>
				</product>
			</function>
			<location unit="FT">
				<x>0.0</x>
				<y>-2.641</y>
				<z>1.469</z>
			</location>
			<direction>
				<x>-1</x>
				<y>0</y>
				<z>0</z>
			</direction>
		</force>

		<force name="Main-Chute" frame="WIND">
			<function>
				<product>
					<property>aero/qbar-modified-psf</property>
					<property>metrics/Sw-sqft</property>
					<value>384.2</value>
					<pow>
						<property>systems/spacecraft/main-chute-pos-norm</property>
						<value>2.0</value>
					</pow>
					<difference>
						<value>1</value>
						<property>systems/spacecraft/main-chute-dropped</property>
					</difference>
					<difference>
						<value>1</value>
						<property>systems/spacecraft/main-chute-teared</property>
					</difference>
				</product>
			</function>
			<location unit="FT">
				<x>0.0</x>
				<y>0.0</y>
				<z>9.379</z>
			</location>
			<direction>
				<x>-1</x>
				<y>0</y>
				<z>0</z>
			</direction>
		</force>

	</external_reactions>
	<aerodynamics>

		<!--
			Aerodynamics is maded by Datcom+ on base of actually winged models with
			very small wings what was used only to have base numbers for calcutations.
		-->

		<axis name="LIFT">


			<!--First stage-->

			<function name="aero/coefficient/CLwbh_First">
			<description>
				Lift due to alpha
			</description>
			<product>
				<property>aero/qbar-modified-psf</property>
				<property>metrics/Sw-sqft</property>
				<property>stages/first</property>
			<table>
				<independentVar lookup="row">aero/alpha-rotated-rad</independentVar>
				<independentVar lookup="column">velocities/mach</independentVar>
			<tableData>
		0.0	.25	.5	2.0	3.0	4.0
-1.571		0.0	-6.534	-7.153	-64.47	-40.0	-40.0
-1.309		0.0	-5.777	-6.135	-5.937	-3.0	-3.0
-1.047		0.0	-4.762	-4.789	-38.31	-24.83	-24.83
-.7854		0.0	-3.606	-3.409	-14.49	-13.30	-13.30
-.5236		0.0	-2.349	-2.224	-11.57	-10.68	-10.68
-.2618		0.0	-1.113	-1.089	-4.820	-5.320	-5.365
-.1745		0.0	-.7154	-.7199	-2.956	-3.095	-3.238
-.8727E-01	0.0	-.3288	-.3379	-1.355	-1.379	-1.390
-.3491E-01	0.0	-.1227	-.1277	-.5082	-.5171	-.5188
.000		0.0	.000	.000	.000	.000	.000
.3491E-01	0.0	.1227	.1277	.5081	.5165	.5178
.8727E-01	0.0	.3288	.3379	1.353	1.371	1.378
.1745		0.0	.7154	.7199	2.950	3.051	3.183
.2618		0.0	1.113	1.089	4.820	5.232	5.273
.5236		0.0	2.220	2.309	11.53	10.64	10.64
.7854		0.0	3.795	3.975	14.44	12.91	12.91
1.047		0.0	5.299	5.694	33.78	22.93	22.93
1.309		0.0	6.298	6.871	5.970	4.0	4.0
1.571		0.0	6.534	7.153	-.5575	-.4	.4
			</tableData>
			</table>
			</product>
			</function>

			<!--Second stage-->

			<function name="aero/coefficient/CLwbh_Second">
			<description>
				Lift due to alpha
			</description>
			<product>
				<property>aero/qbar-modified-psf</property>
				<property>metrics/Sw-sqft</property>
				<property>stages/second</property>
			<table>
				<independentVar lookup="row">aero/alpha-rotated-rad</independentVar>
				<independentVar lookup="column">velocities/mach</independentVar>
			<tableData>
		0.0	.25	.5	2.0	3.0	4.0	5.0
-1.571		0.0	-8.927	-7.833	-40.66	-1.727	-1.869	-1.0
-1.309		0.0	-7.850	-6.756	-21.96	-22.81	-23.92	-16.26
-1.047		0.0	-7.130	-6.098	-128.1	-79.68	-57.40	-45.0
-.7854		0.0	-6.407	-5.607	-38.04	-31.80	-29.43	-25.0
-.5236		0.0	-5.125	-4.730	-26.36	-21.12	-19.00	-17.63
-.2618		0.0	-3.029	-2.938	-7.328	-8.778	-7.023	-6.455
-.1745		0.0	-2.087	-2.064	-3.550	-2.849	1.365	-3.096
-.8727E-01	0.0	-1.045	-1.050	-1.246	-.7620	-.6357	-.4978
-.3491E-01	0.0	-.4061	-.4062	-.3699	-.1923	-.1241	-.6465E-01
.000		0.0	.000	.000	.000	.000	.000	.000
.3491E-01	0.0	.4061	.4062	.3702	.1937	.1265	.6723E-01
.8727E-01	0.0	1.045	1.050	1.251	.8067	.6518	.5322
.1745		0.0	2.087	2.064	3.574	2.960	3.094	3.027
.2618		0.0	3.029	2.938	7.327	7.431	7.023	6.078
.5236		0.0	4.835	4.828	26.29	21.08	18.74	17.29
.7854		0.0	6.524	6.500	37.96	30.97	28.90	25.0
1.047		0.0	7.929	7.661	117.2	73.68	54.36	50.0
1.309		0.0	8.726	8.079	22.52	23.72	25.12	-19.51
1.571		0.0	8.927	7.833	-.8512	-.3366	-.2417	-2.0
			</tableData>
			</table>
			</product>
			</function>

			<!--Third stage-->

			<function name="aero/coefficient/CLwbh_Third">
			<description>
				Lift due to alpha
			</description>
			<product>
				<property>aero/qbar-modified-psf</property>
				<property>metrics/Sw-sqft</property>
				<property>stages/third</property>
			<table>
				<independentVar lookup="row">aero/alpha-rotated-rad</independentVar>
				<independentVar lookup="column">velocities/mach</independentVar>
			<tableData>
		0.0	.25	.5	2.0		3.0	4.0		5.0
-1.571		0.0	-6.815	-6.972	.6229E-06	.5	-.2286E-06	-.2
-1.309		0.0	-5.777	-5.884	-3.850		-3.139	-2.0		-1.8
-1.047		0.0	-4.664	-4.700	-7.707		-6.0	-7.211		-5.803
-.7854		0.0	-3.497	-3.479	-8.195		-7.153	-7.0		-5.4
-.5236		0.0	-2.302	-2.287	-6.823		-5.850	-5.6		-5.0
-.2618		0.0	-1.138	-1.134	-2.964		-2.887	-2.846		-2.6
-.1745		0.0	-.7452	-.7461	-1.837		-1.669	-1.707		-1.7
-.8727E-01	0.0	-.3633	-.3645	-.8576		-.7469	-.7286		-.7127
-.3491E-01	0.0	-.1429	-.1436	-.3261		-.2809	-.2724		-.2655
.000		0.0	.000	.000	.000		.000	.000		.000
.3491E-01	0.0	.1429	.1436	.3261		.2809	.2723		.2654
.8727E-01	0.0	.3633	.3645	.8581		.7464	.7273		.7148
.1745		0.0	.7452	.7461	1.840		1.664	1.696		1.4
.2618		0.0	1.138	1.134	2.968		2.873	2.823		2.4
.5236		0.0	2.285	2.292	6.820		5.843	5.6		4.0
.7854		0.0	3.514	3.547	8.169		7.094	6.6		4.5
1.047		0.0	4.734	4.822	12.56		10.0	7.854		6.038
1.309		0.0	5.850	5.987	3.910		3.714	2.4		2.3
1.571		0.0	6.815	6.972	5.0		4.0	3.0		2.8
			</tableData>
			</table>
			</product>
			</function>

			<!--TDU stage-->

			<function name="aero/coefficient/CLwbh_TDU">
			<description>
				Lift due to alpha
			</description>
			<product>
				<property>aero/qbar-modified-psf</property>
				<property>metrics/Sw-sqft</property>
				<property>stages/tdu</property>
			<table>
				<independentVar lookup="row">aero/alpha-rotated-rad</independentVar>
				<independentVar lookup="column">velocities/mach</independentVar>
			<tableData>
		0.0	.25		.5		2.0	3.0		4.0		5.0
-1.571		0.0	-3.463		-3.493		-7.0	-.1860E-06	-.1715E-06	-.1813E-06
-1.309		0.0	-2.901		-2.918		-5.5	-4.5		-4.4		-2.488
-1.047		0.0	-2.338		-2.337		-5.073	-4.750		-4.6		-4.4
-.7854		0.0	-1.771		-1.759		-5.405	-4.905		-4.8		-4.602
-.5236		0.0	-1.190		-1.183		-4.258	-3.799		-3.612		-3.4
-.2618		0.0	-.6014		-.6001		-1.592	-1.732		-1.771		-1.676
-.1745		0.0	-.3983		-.3987		-.9203	-.9309		-1.008		-0.9
-.8727E-01	0.0	-.1971		-.1976		-.4000	-.3891		-.3995		-.4022
-.3491E-01	0.0	-.7827E-01	-.7853E-01	-.1446	-.1405		-.1440		-.1435
.000		0.0	.000		.000		.000	.000		.000		.000
.3491E-01	0.0	.7827E-01	.7853E-01	.1446	.1405		.1440		.1435
.8727E-01	0.0	.1971		.1976		.3995	.3889		.3989		.4013
.1745		0.0	.3983		.3987		.9174	.9284		1.003		0.9
.2618		0.0	.6014		.6001		1.586	1.725		1.754		1.676
.5236		0.0	1.183		1.185		4.258	3.796		3.612		3.4
.7854		0.0	1.778		1.789		5.394	4.858		4.8		4.602
1.047		0.0	2.369		2.390		7.581	5.603		4.6		4.4
1.309		0.0	2.933		2.962		8.5	6.6		4.4		2.488
1.571		0.0	3.463		3.498		9.0	.1860E-06	.1715E-06	.1813E-06
			</tableData>
			</table>
			</product>
			</function>

		</axis>

		<axis name="DRAG">

			<!--First stage-->

			<function name="aero/coefficient/CD_First">
			<description>
				Drag due to alpha
			</description>
			<product>
				<property>aero/qbar-modified-psf</property>
				<property>metrics/Sw-sqft</property>
				<property>stages/first</property>
				<value>0.5</value>
			<table>
				<independentVar lookup="row">aero/alpha-rotated-rad</independentVar>
				<independentVar lookup="column">velocities/mach</independentVar>
			<tableData>
		0.0	0.25	0.5	0.9	1.1	2.0	3.0	4.0
-1.571		0.0	7.098	7.851	8.5	20.0	22.68	15.0	21.06
-1.309		0.0	6.395	7.029	7.5	22.0	23.69	16.0	23.0
-1.047		0.0	4.802	5.125	5.5	30.0	33.56	23.65	33.0
-.7854		0.0	2.912	2.936	3.2	12.0	14.03	12.98	13.0
-.5236		0.0	1.388	1.363	1.5	6.0	6.789	6.263	7.0
-.2618		0.0	.5332	.5299	.55	1.3	1.523	1.638	1.777
-.1745		0.0	.3937	.3966	.4	.7	.7789	.8019	.8596
-.8727E-01	0.0	.3189	.3234	.33	.37	.3959	.4050	.4220
-.3491E-01	0.0	.3013	.3057	.3077	.3	.3001	.3091	.3247
.000		0.0	.2983	.3027	.3057	.27	.2833	.2922	.3077
.3491E-01	0.0	.3013	.3057	.3077	.3	.3001	.3091	.3247
.8727E-01	0.0	.3189	.3234	.33	.37	.3958	.4051	.4222
.1745		0.0	.3937	.3966	.4	.7	.7784	.8031	.8551
.2618		0.0	.5332	.5299	.55	1.3	1.523	1.640	1.732
.5236		0.0	1.363	1.379	1.5	6.0	6.777	6.257	7.0
.7854		0.0	2.833	2.912	3.2	12.0	14.00	12.83	13.0
1.047		0.0	4.710	5.040	5.5	30.0	31.22	22.98	33.0
1.309		0.0	6.349	6.967	7.5	22.0	23.75	16.0	23.0
1.571		0.0	7.098	7.851	8.5	20.0	22.91	15.0	21.06
			</tableData>
			</table>
			</product>
			</function>

			<function name="aero/coefficient/CDbeta_First">
			<description>
				Drag due to beta
			</description>
			<product>
				<property>aero/qbar-modified-psf</property>
				<property>metrics/Sw-sqft</property>
				<property>stages/first</property>
				<value>0.5</value>
			<table>
				<independentVar lookup="row">aero/beta-rad</independentVar>
				<independentVar lookup="column">velocities/mach</independentVar>
			<tableData>
		0.0	0.25	0.5	0.9	1.1	2.0	3.0	4.0
-1.571		0.0	7.098	7.851	8.5	20.0	22.68	15.0	21.06
-1.309		0.0	6.395	7.029	7.5	22.0	23.69	16.0	23.0
-1.047		0.0	4.802	5.125	5.5	30.0	33.56	23.65	33.0
-.7854		0.0	2.912	2.936	3.2	12.0	14.03	12.98	13.0
-.5236		0.0	1.388	1.363	1.5	6.0	6.789	6.263	7.0
-.2618		0.0	.5332	.5299	.55	1.3	1.523	1.638	1.777
-.1745		0.0	.3937	.3966	.4	.7	.7789	.8019	.8596
-.8727E-01	0.0	.3189	.3234	.33	.37	.3959	.4050	.4220
-.3491E-01	0.0	.3013	.3057	.3077	.3	.3001	.3091	.3247
.000		0.0	.2983	.3027	.3057	.27	.2833	.2922	.3077
.3491E-01	0.0	.3013	.3057	.3077	.3	.3001	.3091	.3247
.8727E-01	0.0	.3189	.3234	.33	.37	.3958	.4051	.4222
.1745		0.0	.3937	.3966	.4	.7	.7784	.8031	.8551
.2618		0.0	.5332	.5299	.55	1.3	1.523	1.640	1.732
.5236		0.0	1.363	1.379	1.5	6.0	6.777	6.257	7.0
.7854		0.0	2.833	2.912	3.2	12.0	14.00	12.83	13.0
1.047		0.0	4.710	5.040	5.5	30.0	31.22	22.98	33.0
1.309		0.0	6.349	6.967	7.5	22.0	23.75	16.0	23.0
1.571		0.0	7.098	7.851	8.5	20.0	22.91	15.0	21.06
			</tableData>
			</table>
			</product>
			</function>

			<!--Second stage-->

			<function name="aero/coefficient/CD_Second">
			<description>
				Drag due to alpha
			</description>
			<product>
				<property>aero/qbar-modified-psf</property>
				<property>metrics/Sw-sqft</property>
				<property>stages/second</property>
				<value>0.5</value>
			<table>
				<independentVar lookup="row">aero/alpha-rotated-rad</independentVar>
				<independentVar lookup="column">velocities/mach</independentVar>
			<tableData>
		0.0	0.25	0.5	2.0	3.0	4.0	5.0
-1.571		0.0	12.41	12.73	82.20	77.21	75.99	77.0
-1.309		0.0	10.40	10.71	78.90	73.22	71.57	71.75
-1.047		0.0	7.678	7.845	126.6	103.1	83.77	85.0
-.7854		0.0	4.908	4.848	38.93	33.64	31.48	33.0
-.5236		0.0	2.639	2.542	17.79	14.79	13.48	12.82
-.2618		0.0	1.064	1.029	4.929	5.522	4.589	4.397
-.1745		0.0	.7052	.6890	3.641	3.341	1.637	3.225
-.8727E-01	0.0	.4688	.4574	3.131	2.906	2.813	2.737
-.3491E-01	0.0	.4016	.3899	3.033	2.848	2.760	2.704
.000		0.0	.3889	.3769	3.020	2.839	2.754	2.702
.3491E-01	0.0	.4016	.3899	3.033	2.848	2.760	2.705
.8727E-01	0.0	.4688	.4574	3.132	2.917	2.816	2.745
.1745		0.0	.7052	.6890	3.648	3.374	3.291	3.205
.2618		0.0	1.064	1.029	4.928	4.825	4.589	4.255
.5236		0.0	2.538	2.551	17.74	14.76	13.28	12.50
.7854		0.0	4.839	4.931	38.87	32.76	30.85	33.0
1.047		0.0	7.649	7.818	118.7	96.99	80.27	85.0
1.309		0.0	10.35	10.61	79.29	73.53	71.86	72.13
1.571		0.0	12.41	12.73	82.64	77.24	75.97	77.0
			</tableData>
			</table>
			</product>
			</function>

			<function name="aero/coefficient/CDbeta_Second">
			<description>
				Drag due to beta
			</description>
			<product>
				<property>aero/qbar-modified-psf</property>
				<property>metrics/Sw-sqft</property>
				<property>stages/second</property>
				<value>0.5</value>
			<table>
				<independentVar lookup="row">aero/beta-rad</independentVar>
				<independentVar lookup="column">velocities/mach</independentVar>
			<tableData>
		0.0	0.25	0.5	2.0	3.0	4.0	5.0
-1.571		0.0	12.41	12.73	82.20	77.21	75.99	77.0
-1.309		0.0	10.40	10.71	78.90	73.22	71.57	71.75
-1.047		0.0	7.678	7.845	126.6	103.1	83.77	85.0
-.7854		0.0	4.908	4.848	38.93	33.64	31.48	33.0
-.5236		0.0	2.639	2.542	17.79	14.79	13.48	12.82
-.2618		0.0	1.064	1.029	4.929	5.522	4.589	4.397
-.1745		0.0	.7052	.6890	3.641	3.341	1.637	3.225
-.8727E-01	0.0	.4688	.4574	3.131	2.906	2.813	2.737
-.3491E-01	0.0	.4016	.3899	3.033	2.848	2.760	2.704
.000		0.0	.3889	.3769	3.020	2.839	2.754	2.702
.3491E-01	0.0	.4016	.3899	3.033	2.848	2.760	2.705
.8727E-01	0.0	.4688	.4574	3.132	2.917	2.816	2.745
.1745		0.0	.7052	.6890	3.648	3.374	3.291	3.205
.2618		0.0	1.064	1.029	4.928	4.825	4.589	4.255
.5236		0.0	2.538	2.551	17.74	14.76	13.28	12.50
.7854		0.0	4.839	4.931	38.87	32.76	30.85	33.0
1.047		0.0	7.649	7.818	118.7	96.99	80.27	85.0
1.309		0.0	10.35	10.61	79.29	73.53	71.86	72.13
1.571		0.0	12.41	12.73	82.64	77.24	75.97	77.0
			</tableData>
			</table>
			</product>
			</function>

			<!--Third stage-->

			<function name="aero/coefficient/CD_Third">
			<description>
				Drag due to alpha
			</description>
			<product>
				<property>aero/qbar-modified-psf</property>
				<property>metrics/Sw-sqft</property>
				<property>stages/third</property>
				<value>0.5</value>
			<table>
				<independentVar lookup="row">aero/alpha-rotated-rad</independentVar>
				<independentVar lookup="column">velocities/mach</independentVar>
			<tableData>
		0.0	0.25	0.5	2.0	3.0	4.0	5.0
-1.571		0.0	8.693	8.592	12.94	10.0	11.91	10.0
-1.309		0.0	7.481	7.356	14.05	12.83	12.0	11.0
-1.047		0.0	5.899	5.706	16.54	14.0	12.38	11.20
-.7854		0.0	4.303	4.045	9.886	8.893	8.8	8.0
-.5236		0.0	2.998	2.732	6.207	5.601	5.6	5.3
-.2618		0.0	2.172	1.911	3.361	3.284	3.228	3.0
-.1745		0.0	2.008	1.750	2.945	2.859	2.808	2.7
-.8727E-01	0.0	1.910	1.653	2.728	2.662	2.603	2.527
-.3491E-01	0.0	1.883	1.626	2.673	2.615	2.557	2.482
.000		0.0	1.878	1.621	2.664	2.607	2.549	2.475
.3491E-01	0.0	1.883	1.626	2.673	2.615	2.557	2.482
.8727E-01	0.0	1.910	1.653	2.728	2.662	2.602	2.528
.1745		0.0	2.008	1.750	2.946	2.858	2.807	2.7
.2618		0.0	2.172	1.911	3.363	3.281	3.219	3.0
.5236		0.0	2.990	2.734	6.206	5.599	5.6	5.3
.7854		0.0	4.310	4.070	9.872	8.854	8.8	8.0
1.047		0.0	5.916	5.727	15.50	14.0	12.12	11.20
1.309		0.0	7.485	7.357	14.06	13.11	12.0	11.0
1.571		0.0	8.693	8.592	12.0	10.0	11.91	10.0
			</tableData>
			</table>
			</product>
			</function>

			<function name="aero/coefficient/CDbeta_Third">
			<description>
				Drag due to beta
			</description>
			<product>
				<property>aero/qbar-modified-psf</property>
				<property>metrics/Sw-sqft</property>
				<property>stages/third</property>
				<value>0.5</value>
			<table>
				<independentVar lookup="row">aero/beta-rad</independentVar>
				<independentVar lookup="column">velocities/mach</independentVar>
			<tableData>
		0.0	0.25	0.5	2.0	3.0	4.0	5.0
-1.571		0.0	8.693	8.592	12.94	10.0	11.91	10.0
-1.309		0.0	7.481	7.356	14.05	12.83	12.0	11.0
-1.047		0.0	5.899	5.706	16.54	14.0	12.38	11.20
-.7854		0.0	4.303	4.045	9.886	8.893	8.8	8.0
-.5236		0.0	2.998	2.732	6.207	5.601	5.6	5.3
-.2618		0.0	2.172	1.911	3.361	3.284	3.228	3.0
-.1745		0.0	2.008	1.750	2.945	2.859	2.808	2.7
-.8727E-01	0.0	1.910	1.653	2.728	2.662	2.603	2.527
-.3491E-01	0.0	1.883	1.626	2.673	2.615	2.557	2.482
.000		0.0	1.878	1.621	2.664	2.607	2.549	2.475
.3491E-01	0.0	1.883	1.626	2.673	2.615	2.557	2.482
.8727E-01	0.0	1.910	1.653	2.728	2.662	2.602	2.528
.1745		0.0	2.008	1.750	2.946	2.858	2.807	2.7
.2618		0.0	2.172	1.911	3.363	3.281	3.219	3.0
.5236		0.0	2.990	2.734	6.206	5.599	5.6	5.3
.7854		0.0	4.310	4.070	9.872	8.854	8.8	8.0
1.047		0.0	5.916	5.727	15.50	14.0	12.12	11.20
1.309		0.0	7.485	7.357	14.06	13.11	12.0	11.0
1.571		0.0	8.693	8.592	12.0	10.0	11.91	10.0
			</tableData>
			</table>
			</product>
			</function>

			<!--TDU stage-->

			<function name="aero/coefficient/CD_TDU">
			<description>
				Drag due to alpha
			</description>
			<product>
				<property>aero/qbar-modified-psf</property>
				<property>metrics/Sw-sqft</property>
				<property>stages/tdu</property>
				<value>0.5</value>
			<table>
				<independentVar lookup="row">aero/alpha-rotated-rad</independentVar>
				<independentVar lookup="column">velocities/mach</independentVar>
			<tableData>
		0.0	0.25	0.5	2.0	3.0	4.0	5.0
-1.571		0.0	4.481	4.377	11.5	9.769	9.608	9.542
-1.309		0.0	3.830	3.721	11.0	9.6	9.4	9.990
-1.047		0.0	3.035	2.912	11.92	9.532	9.2	9.0
-.7854		0.0	2.250	2.110	7.530	7.042	6.6	6.791
-.5236		0.0	1.602	1.461	5.155	4.891	4.794	4.6
-.2618		0.0	1.175	1.037	3.463	3.493	3.503	3.470
-.1745		0.0	1.088	.9511	3.262	3.255	3.269	3.2
-.8727E-01	0.0	1.035	.8983	3.173	3.163	3.163	3.153
-.3491E-01	0.0	1.021	.8836	3.153	3.144	3.144	3.133
.000		0.0	1.018	.8808	3.150	3.141	3.140	3.130
.3491E-01	0.0	1.021	.8836	3.153	3.144	3.144	3.133
.8727E-01	0.0	1.035	.8983	3.173	3.163	3.163	3.153
.1745		0.0	1.088	.9511	3.262	3.255	3.268	3.2
.2618		0.0	1.175	1.037	3.463	3.491	3.500	3.470
.5236		0.0	1.598	1.462	5.155	4.890	4.794	4.6
.7854		0.0	2.254	2.122	7.525	7.016	6.6	6.791
1.047		0.0	3.043	2.922	11.30	9.434	9.2	9.0
1.309		0.0	3.832	3.722	11.0	9.5	9.4	9.990
1.571		0.0	4.481	4.377	11.5	9.769	9.608	9.542
			</tableData>
			</table>
			</product>
			</function>

			<function name="aero/coefficient/CDbeta_TDU">
			<description>
				Drag due to beta
			</description>
			<product>
				<property>aero/qbar-modified-psf</property>
				<property>metrics/Sw-sqft</property>
				<property>stages/tdu</property>
				<value>0.5</value>
			<table>
				<independentVar lookup="row">aero/beta-rad</independentVar>
				<independentVar lookup="column">velocities/mach</independentVar>
			<tableData>
		0.0	0.25	0.5	2.0	3.0	4.0	5.0
-1.571		0.0	4.481	4.377	11.5	9.769	9.608	9.542
-1.309		0.0	3.830	3.721	11.0	9.6	9.4	9.990
-1.047		0.0	3.035	2.912	11.92	9.532	9.2	9.0
-.7854		0.0	2.250	2.110	7.530	7.042	6.6	6.791
-.5236		0.0	1.602	1.461	5.155	4.891	4.794	4.6
-.2618		0.0	1.175	1.037	3.463	3.493	3.503	3.470
-.1745		0.0	1.088	.9511	3.262	3.255	3.269	3.2
-.8727E-01	0.0	1.035	.8983	3.173	3.163	3.163	3.153
-.3491E-01	0.0	1.021	.8836	3.153	3.144	3.144	3.133
.000		0.0	1.018	.8808	3.150	3.141	3.140	3.130
.3491E-01	0.0	1.021	.8836	3.153	3.144	3.144	3.133
.8727E-01	0.0	1.035	.8983	3.173	3.163	3.163	3.153
.1745		0.0	1.088	.9511	3.262	3.255	3.268	3.2
.2618		0.0	1.175	1.037	3.463	3.491	3.500	3.470
.5236		0.0	1.598	1.462	5.155	4.890	4.794	4.6
.7854		0.0	2.254	2.122	7.525	7.016	6.6	6.791
1.047		0.0	3.043	2.922	11.30	9.434	9.2	9.0
1.309		0.0	3.832	3.722	11.0	9.5	9.4	9.990
1.571		0.0	4.481	4.377	11.5	9.769	9.608	9.542
			</tableData>
			</table>
			</product>
			</function>

			<!--Spacecraft stage -->

			<function name="aero/coefficient/CD_Spacecraft">
			<description>
				Drag due to mach
			</description>
			<product>
				<property>aero/qbar-modified-psf</property>
				<property>metrics/Sw-sqft</property>
				<property>stages/spacecraft</property>
			<table>
				<independentVar lookup="row">velocities/mach</independentVar>
			<tableData>
	0.0	2.50
	0.25	2.998
	0.5	2.732
	0.9	2.6
	1.1	5.0
	2.0	5.7
	3.0	5.6
	4.0	5.7
	5.0	5.9
			</tableData>
			</table>
			<table>
				<independentVar lookup="row">systems/spacecraft/main-chute-dropped</independentVar>
				<tableData>
					0.0		1.0
					1.0		0.0
				</tableData>
			</table>
			</product>
			</function>

		</axis>

		<axis name="PITCH">

			<!--First stage -->

			<function name="aero/coefficient/Cmbasic_First">
			<description>
				Basic pitch moment coefficient
			</description>
			<product>
				<property>aero/qbar-modified-psf</property>
				<property>metrics/Sw-sqft</property>
				<property>metrics/cbarw-ft</property>
				<property>stages/first</property>
			<table>
				<independentVar lookup="row">aero/alpha-rotated-rad</independentVar>
				<independentVar lookup="column">velocities/mach</independentVar>
			<tableData>
		0.0	.25		.5	2.0	3.0	4.0
-1.571		0.0	-73.63		-78.12	-993.2	-183.0	-190.0
-1.309		0.0	-66.31		-70.73	-149.1	-150.0	-165.0
-1.047		0.0	-53.55		-57.50	-418.5	-416.3	-400.0
-.7854		0.0	-34.75		-37.64	-242.5	-242.6	-250.0
-.5236		0.0	-14.99		-16.61	-136.7	-136.9	-140.0
-.2618		0.0	-1.805		-2.117	-46.48	-48.77	-50.51
-.1745		0.0	.4931E-01	.1018	-27.89	-29.75	-30.75
-.8727E-01	0.0	.4699		.5839	-13.31	-14.24	-14.73
-.3491E-01	0.0	.2728		.3359	-5.294	-5.668	-5.868
.000		0.0	.000		.000	.000	.000	.000
.3491E-01	0.0	-.2728		-.3359	5.295	5.675	5.881
.8727E-01	0.0	-.4699		-.5839	13.34	14.34	14.88
.1745		0.0	-.4931E-01	-.1018	27.98	30.30	31.43
.2618		0.0	1.805		2.117	46.48	49.99	51.52
.5236		0.0	16.55		15.59	137.1	137.4	140.0
.7854		0.0	32.83		32.01	242.8	246.3	250.0
1.047		0.0	49.87		51.59	395.7	397.5	400.0
1.309		0.0	64.66		68.64	151.3	150.0	165.0
1.571		0.0	73.63		78.12	-185.3	183.0	190.0
			</tableData>
			</table>
			</product>
			</function>

			<function name="aero/coefficient/CmDe_First">
			<description>
				Pitch moment coefficient due to elevator deflection
				Positive surface deflection is trailing edge down
			</description>
			<product>
				<property>aero/qbar-modified-psf</property>
				<property>metrics/Sw-sqft</property>
				<property>metrics/cbarw-ft</property>
				<property>stages/first</property>
			<table>
				<independentVar lookup="row">fcs/elevator-pos-rad</independentVar>
				<independentVar lookup="column">velocities/mach</independentVar>
			<tableData>
		0.0	.25		.5	2.0	3.0	4.0
-.7854		0.0	-1.711		-1.671	-239.8	-140.7	-97.73
-.5236		0.0	-1.315		-1.285	-159.9	-93.81	-65.15
-.2618		0.0	-1.106		-1.080	-79.94	-46.90	-32.58
-.8727E-01	0.0	-.4045		-.3951	-26.65	-15.63	-10.86
.000		0.0	.0		0.0	.000	.000	.000
.8727E-01	0.0	.4045		.3951	26.65	15.63	10.86
.2618		0.0	1.106		1.080	79.94	46.90	32.58
.5236		0.0	1.315		1.285	159.9	93.81	65.15
.7854		0.0	1.711		1.671	239.8	140.7	97.73
			</tableData>
			</table>
			</product>
			</function>

			<!--Second stage -->

			<function name="aero/coefficient/Cmbasic_Second">
			<description>
				Basic pitch moment coefficient
			</description>
			<product>
				<property>aero/qbar-modified-psf</property>
				<property>metrics/Sw-sqft</property>
				<property>metrics/cbarw-ft</property>
				<property>stages/second</property>
			<table>
				<independentVar lookup="row">aero/alpha-rotated-rad</independentVar>
				<independentVar lookup="column">velocities/mach</independentVar>
			<tableData>
		0.0	.25		.5		2.0	3.0	4.0	5.0
-1.571		0.0	-320.1		-315.2		-1020.	-83.01	-350.8	-120.0
-1.309		0.0	-263.0		-264.5		-2182.	-2011.	-2020.	-710.4
-1.047		0.0	-218.2		-226.2		-3969.	-3200.	-2688.	-649.5
-.7854		0.0	-157.0		-169.2		-1558.	-1217.	-1097.	-900.0
-.5236		0.0	-89.95		-97.76		-631.5	-433.2	-358.4	-279.2
-.2618		0.0	-35.22		-37.18		-122.4	-46.94	-61.04	-32.23
-.1745		0.0	-21.85		-22.37		-62.17	-38.06	-18.0	-15.73
-.8727E-01	0.0	-10.69		-10.63		-28.08	-15.85	-11.03	-7.187
-.3491E-01	0.0	-4.478		-4.490		-11.16	-5.892	-4.252	-2.523
.000		0.0	.000		.000		.000	.000	.000	.000
.3491E-01	0.0	4.478		4.490		11.15	5.859	4.197	2.464
.8727E-01	0.0	10.69		10.63		27.96	14.83	10.75	6.412
.1745		0.0	21.84		22.36		61.64	36.19	27.50	17.26
.2618		0.0	35.20		37.16		122.4	78.64	61.04	40.86
.5236		0.0	95.08		94.05		633.2	434.3	366.8	291.6
.7854		0.0	150.4		149.9		1559.	1231.	1109.	900.0
1.047		0.0	206.6		207.6		3791.	3056.	2601.	800.0
1.309		0.0	262.0		261.8		2221.	2060.	2082.	649.5
1.571		0.0	320.1		315.2		-38.75	140.1	204.5	120.0
			</tableData>
			</table>
			</product>
			</function>

			<!--Third stage -->

			<function name="aero/coefficient/Cmbasic_Third">
			<description>
				Basic pitch moment coefficient
			</description>
			<product>
				<property>aero/qbar-modified-psf</property>
				<property>metrics/Sw-sqft</property>
				<property>metrics/cbarw-ft</property>
				<property>stages/third</property>
			<table>
				<independentVar lookup="row">aero/alpha-rotated-rad</independentVar>
				<independentVar lookup="column">velocities/mach</independentVar>
			<tableData>
		0.0	.25	.5	2.0	3.0	4.0	5.0
-1.571		0.0	-29.03	-29.19	-40.52	-37.0	-33.30	-25.0
-1.309		0.0	-24.35	-24.52	-15.77	-11.34	-10.0	-7.0
-1.047		0.0	-19.39	-19.58	-25.58	-53.0	-47.11	-39.94
-.7854		0.0	-14.08	-14.26	-39.01	-37.84	-35.0	-33.0
-.5236		0.0	-8.820	-8.922	-25.62	-24.17	-22.0	-20.0
-.2618		0.0	-3.965	-3.991	-10.73	-10.30	-10.28	-10.0
-.1745		0.0	-2.599	-2.594	-6.833	-6.585	-6.587	-6.0
-.8727E-01	0.0	-1.292	-1.285	-3.341	-3.223	-3.235	-3.229
-.3491E-01	0.0	-.5157	-.5117	-1.329	-1.285	-1.290	-1.280
.000		0.0	.000	.000	.000	.000	.000	.000
.3491E-01	0.0	.5157	.5117	1.329	1.285	1.291	1.280
.8727E-01	0.0	1.292	1.285	3.338	3.226	3.242	3.217
.1745		0.0	2.599	2.594	6.818	6.615	6.649	6.0
.2618		0.0	3.965	3.991	10.71	10.38	10.40	10.0
.5236		0.0	8.922	8.893	25.63	24.21	22.0	20.0
.7854		0.0	13.99	13.91	39.08	38.01	35.0	33.0
1.047		0.0	19.13	19.16	56.59	53.0	50.43	41.40
1.309		0.0	24.22	24.35	16.35	18.79	10.0	7.0
1.571		0.0	29.03	29.19	40.52	37.0	33.30	25.0
			</tableData>
			</table>
			</product>
			</function>

			<!--TDU stage -->

			<function name="aero/coefficient/Cmbasic_TDU">
			<description>
				Basic pitch moment coefficient
			</description>
			<product>
				<property>aero/qbar-modified-psf</property>
				<property>metrics/Sw-sqft</property>
				<property>metrics/cbarw-ft</property>
				<property>stages/tdu</property>
			<table>
				<independentVar lookup="row">aero/alpha-rotated-rad</independentVar>
				<independentVar lookup="column">velocities/mach</independentVar>
			<tableData>
		0.0	.25	.5	2.0	3.0	4.0		5.0
-1.571		0.0	-36.10	-36.00	-38.0	-40.0	-42.0		-44.0
-1.309		0.0	-30.01	-29.93	-31.0	-35.0	-40.0		-42.0
-1.047		0.0	-23.99	-23.96	-24.48	-46.88	-65.0		-70.0
-.7854		0.0	-17.95	-17.98	-23.11	-23.41	-30.0		-32.0
-.5236		0.0	-11.92	-11.94	-15.27	-15.12	-26.72		-26.0
-.2618		0.0	-5.932	-5.937	-6.642	-6.751	-6.950		-7.2
-.1745		0.0	-3.963	-3.962	-4.304	-4.379	-4.537		-4.6
-.8727E-01	0.0	-1.988	-1.987	-2.145	-2.168	-2.247		-2.274
-.3491E-01	0.0	-.7971	-.7962	-.8608	-.8680	-.8987		-.9094
.000		0.0	.000	.000	.000	.000	.000		.000
.3491E-01	0.0	.7971	.7962	.8609	.8680	.8988		.9096
.8727E-01	0.0	1.988	1.987	2.147	2.169	2.249		2.277
.1745		0.0	3.963	3.962	4.307	4.388	4.554		4.6
.2618		0.0	5.932	5.937	6.636	6.775	7.001		7.2
.5236		0.0	11.94	11.94	15.27	15.13	24.70		26.0
.7854		0.0	17.93	17.90	23.23	23.48	30.0		32.0
1.047		0.0	23.92	23.86	24.48	55.76	65.0		70.0
1.309		0.0	29.98	29.89	31.0	35.0	40.0		42.0
1.571		0.0	36.10	36.00	38.0	40.0	42.0		44.0
			</tableData>
			</table>
			</product>
			</function>

			<function name="aero/coefficient/Cmq_Spacecraft">
			<description>
				Pitch Moment coefficient due to pitch speed
			</description>
			<product>
				<table>
					<independentVar lookup="row">aero/qbar-modified-psf</independentVar>
					<tableData>
						0	0
						1	10
						10	100
						100	100
					</tableData>
				</table>
				<property>metrics/Sw-sqft</property>
				<property>metrics/cbarw-ft</property>
				<table>
					<independentVar lookup="row">velocities/q-aero-rad_sec</independentVar>
					<tableData>
						-10	-10
						0	0
						10	10
					</tableData>
				</table>
				<sum>
					<product>
						<value>-0.4</value>
						<table>
							<independentVar lookup="row">systems/spacecraft/main-chute-pos-norm</independentVar>
							<tableData>
								0	1
								1	0
							</tableData>
						</table>
					</product>
					<product>
						<property>aero/ci2vel</property>
						<value>-42.0</value>
						<table>
							<independentVar lookup="row">systems/spacecraft/main-chute-pos-norm</independentVar>
							<tableData>
								0	0
								1	1
							</tableData>
						</table>
					</product>
				</sum>
				<property>stages/spacecraft</property>
			</product>
			</function>

<!--

			<function name="aero/coefficient/Cmq_BrakeChute">
			<description>
				Pitch Moment coefficient due to pitch speed
			</description>
			<product>
				<table>
					<independentVar lookup="row">aero/qbar-modified-psf</independentVar>
					<tableData>
						0	0
						1	10
						10	100
						100	100
					</tableData>
				</table>
				<property>metrics/Sw-sqft</property>
				<property>metrics/cbarw-ft</property>
				<property>aero/ci2vel</property>
				<table>
					<independentVar lookup="row">velocities/q-aero-rad_sec</independentVar>
					<tableData>
						-10	-10
						0	0
						10	10
					</tableData>
				</table>
				<property>stages/spacecraft</property>
				<value>-50.0</value>
				<pow>
					<property>systems/spacecraft/brake-chute-pos-norm</property>
					<value>2.0</value>
				</pow>
				<difference>
					<value>1</value>
					<property>systems/spacecraft/brake-chute-dropped</property>
				</difference>
				<difference>
					<value>1</value>
					<property>systems/spacecraft/brake-chute-teared</property>
				</difference>
			</product>
			</function>

			<function name="aero/coefficient/Cmq_MainChute">
			<description>
				Pitch Moment coefficient due to pitch speed
			</description>
			<product>
				<table>
					<independentVar lookup="row">aero/qbar-modified-psf</independentVar>
					<tableData>
						0	0
						1	10
						10	100
						100	100
					</tableData>
				</table>
				<property>metrics/Sw-sqft</property>
				<property>metrics/cbarw-ft</property>
				<property>aero/ci2vel</property>
				<table>
					<independentVar lookup="row">velocities/q-aero-rad_sec</independentVar>
					<tableData>
						-10	-10
						0	0
						10	10
					</tableData>
				</table>
				<property>stages/spacecraft</property>
				<value>-75.0</value>
				<pow>
					<property>systems/spacecraft/main-chute-pos-norm</property>
					<value>2.0</value>
				</pow>
				<difference>
					<value>1</value>
					<property>systems/spacecraft/main-chute-dropped</property>
				</difference>
				<difference>
					<value>1</value>
					<property>systems/spacecraft/main-chute-teared</property>
				</difference>
			</product>
			</function>

-->

		</axis>

		<axis name="ROLL">

			<!--	Note what carrier and spacecraft is accounted as standing.
				So accounted roll is actually yaw.
				Coefficient due to pitch added to make it. -->

			<!--First stage -->

			<function name="aero/coefficient/Cl_First">
			<description>
				Roll moment due beta and mach coefficient
			</description>
			<product>
				<property>aero/qbar-modified-psf</property>
				<property>metrics/Sw-sqft</property>
				<property>metrics/cbarw-ft</property>
				<property>stages/first</property>
				<sin>
					<property>aero/alpha-rotated-rad</property>
				</sin>
			<table>
				<independentVar lookup="row">aero/beta-rad</independentVar>
				<independentVar lookup="column">velocities/mach</independentVar>
			<tableData>
		0.0	.25		.5	2.0	3.0	4.0
-1.571		0.0	-73.63		-78.12	-993.2	-183.0	-190.0
-1.309		0.0	-66.31		-70.73	-149.1	-150.0	-165.0
-1.047		0.0	-53.55		-57.50	-418.5	-416.3	-400.0
-.7854		0.0	-34.75		-37.64	-242.5	-242.6	-250.0
-.5236		0.0	-14.99		-16.61	-136.7	-136.9	-140.0
-.2618		0.0	-1.805		-2.117	-46.48	-48.77	-50.51
-.1745		0.0	.4931E-01	.1018	-27.89	-29.75	-30.75
-.8727E-01	0.0	.4699		.5839	-13.31	-14.24	-14.73
-.3491E-01	0.0	.2728		.3359	-5.294	-5.668	-5.868
.000		0.0	.000		.000	.000	.000	.000
.3491E-01	0.0	-.2728		-.3359	5.295	5.675	5.881
.8727E-01	0.0	-.4699		-.5839	13.34	14.34	14.88
.1745		0.0	-.4931E-01	-.1018	27.98	30.30	31.43
.2618		0.0	1.805		2.117	46.48	49.99	51.52
.5236		0.0	16.55		15.59	137.1	137.4	140.0
.7854		0.0	32.83		32.01	242.8	246.3	250.0
1.047		0.0	49.87		51.59	395.7	397.5	400.0
1.309		0.0	64.66		68.64	151.3	150.0	165.0
1.571		0.0	73.63		78.12	-185.3	183.0	190.0
			</tableData>
			</table>
			</product>
			</function>

			<function name="aero/coefficient/ClDr_First">
			<description>
				Roll moment coefficient due rudder deflection
			</description>
			<product>
				<property>aero/qbar-modified-psf</property>
				<property>metrics/Sw-sqft</property>
				<property>metrics/cbarw-ft</property>
				<property>stages/first</property>
			<table>
				<independentVar lookup="row">fcs/rudder-pos-rad</independentVar>
				<independentVar lookup="column">velocities/mach</independentVar>
			<tableData>
		0.0	.25		.5	2.0	3.0	4.0
-.7854		0.0	-1.711		-1.671	-239.8	-140.7	-97.73
-.5236		0.0	-1.315		-1.285	-159.9	-93.81	-65.15
-.2618		0.0	-1.106		-1.080	-79.94	-46.90	-32.58
-.8727E-01	0.0	-.4045		-.3951	-26.65	-15.63	-10.86
.000		0.0	.0		0.0	.000	.000	.000
.8727E-01	0.0	.4045		.3951	26.65	15.63	10.86
.2618		0.0	1.106		1.080	79.94	46.90	32.58
.5236		0.0	1.315		1.285	159.9	93.81	65.15
.7854		0.0	1.711		1.671	239.8	140.7	97.73
			</tableData>
			</table>
			</product>
			</function>

			<!--Second stage -->

			<function name="aero/coefficient/Cl_Second">
			<description>
				Basic roll moment coefficient
			</description>
			<product>
				<property>aero/qbar-modified-psf</property>
				<property>metrics/Sw-sqft</property>
				<property>metrics/cbarw-ft</property>
				<property>stages/second</property>
				<sin>
					<property>aero/alpha-rotated-rad</property>
				</sin>
			<table>
				<independentVar lookup="row">aero/beta-rad</independentVar>
				<independentVar lookup="column">velocities/mach</independentVar>
			<tableData>
		0.0	.25		.5		2.0	3.0	4.0	5.0
-1.571		0.0	-320.1		-315.2		-1020.	-83.01	-350.8	-120.0
-1.309		0.0	-263.0		-264.5		-2182.	-2011.	-2020.	-710.4
-1.047		0.0	-218.2		-226.2		-3969.	-3200.	-2688.	-649.5
-.7854		0.0	-157.0		-169.2		-1558.	-1217.	-1097.	-900.0
-.5236		0.0	-89.95		-97.76		-631.5	-433.2	-358.4	-279.2
-.2618		0.0	-35.22		-37.18		-122.4	-46.94	-61.04	-32.23
-.1745		0.0	-21.85		-22.37		-62.17	-38.06	-18.0	-15.73
-.8727E-01	0.0	-10.69		-10.63		-28.08	-15.85	-11.03	-7.187
-.3491E-01	0.0	-4.478		-4.490		-11.16	-5.892	-4.252	-2.523
.000		0.0	.000		.000		.000	.000	.000	.000
.3491E-01	0.0	4.478		4.490		11.15	5.859	4.197	2.464
.8727E-01	0.0	10.69		10.63		27.96	14.83	10.75	6.412
.1745		0.0	21.84		22.36		61.64	36.19	27.50	17.26
.2618		0.0	35.20		37.16		122.4	78.64	61.04	40.86
.5236		0.0	95.08		94.05		633.2	434.3	366.8	291.6
.7854		0.0	150.4		149.9		1559.	1231.	1109.	900.0
1.047		0.0	206.6		207.6		3791.	3056.	2601.	800.0
1.309		0.0	262.0		261.8		2221.	2060.	2082.	649.5
1.571		0.0	320.1		315.2		-38.75	140.1	204.5	120.0
			</tableData>
			</table>
			</product>
			</function>

			<!--Third stage -->

			<function name="aero/coefficient/Cl_Third">
			<description>
				Roll moment due beta and mach coefficient
			</description>
			<product>
				<property>aero/qbar-modified-psf</property>
				<property>metrics/Sw-sqft</property>
				<property>metrics/cbarw-ft</property>
				<property>stages/third</property>
				<sin>
					<property>aero/alpha-rotated-rad</property>
				</sin>
			<table>
				<independentVar lookup="row">aero/beta-rad</independentVar>
				<independentVar lookup="column">velocities/mach</independentVar>
			<tableData>
		0.0	.25	.5	2.0	3.0	4.0	5.0
-1.571		0.0	-29.03	-29.19	-40.52	-37.0	-33.30	-25.0
-1.309		0.0	-24.35	-24.52	-15.77	-11.34	-10.0	-7.0
-1.047		0.0	-19.39	-19.58	-25.58	-53.0	-47.11	-39.94
-.7854		0.0	-14.08	-14.26	-39.01	-37.84	-35.0	-33.0
-.5236		0.0	-8.820	-8.922	-25.62	-24.17	-22.0	-20.0
-.2618		0.0	-3.965	-3.991	-10.73	-10.30	-10.28	-10.0
-.1745		0.0	-2.599	-2.594	-6.833	-6.585	-6.587	-6.0
-.8727E-01	0.0	-1.292	-1.285	-3.341	-3.223	-3.235	-3.229
-.3491E-01	0.0	-.5157	-.5117	-1.329	-1.285	-1.290	-1.280
.000		0.0	.000	.000	.000	.000	.000	.000
.3491E-01	0.0	.5157	.5117	1.329	1.285	1.291	1.280
.8727E-01	0.0	1.292	1.285	3.338	3.226	3.242	3.217
.1745		0.0	2.599	2.594	6.818	6.615	6.649	6.0
.2618		0.0	3.965	3.991	10.71	10.38	10.40	10.0
.5236		0.0	8.922	8.893	25.63	24.21	22.0	20.0
.7854		0.0	13.99	13.91	39.08	38.01	35.0	33.0
1.047		0.0	19.13	19.16	56.59	53.0	50.43	41.40
1.309		0.0	24.22	24.35	16.35	18.79	10.0	7.0
1.571		0.0	29.03	29.19	40.52	37.0	33.30	25.0
			</tableData>
			</table>
			</product>
			</function>

			<!--TDU stage -->

			<function name="aero/coefficient/Cl_TDU">
			<description>
				Roll moment due beta and mach coefficient
			</description>
			<product>
				<property>aero/qbar-modified-psf</property>
				<property>metrics/Sw-sqft</property>
				<property>metrics/cbarw-ft</property>
				<property>stages/tdu</property>
				<sin>
					<property>aero/alpha-rotated-rad</property>
				</sin>
			<table>
				<independentVar lookup="row">aero/beta-rad</independentVar>
				<independentVar lookup="column">velocities/mach</independentVar>
			<tableData>
		0.0	.25	.5	2.0	3.0	4.0		5.0
-1.571		0.0	-36.10	-36.00	-38.0	-40.0	-42.0		-44.0
-1.309		0.0	-30.01	-29.93	-31.0	-35.0	-40.0		-42.0
-1.047		0.0	-23.99	-23.96	-24.48	-46.88	-65.0		-70.0
-.7854		0.0	-17.95	-17.98	-23.11	-23.41	-30.0		-32.0
-.5236		0.0	-11.92	-11.94	-15.27	-15.12	-26.72		-26.0
-.2618		0.0	-5.932	-5.937	-6.642	-6.751	-6.950		-7.2
-.1745		0.0	-3.963	-3.962	-4.304	-4.379	-4.537		-4.6
-.8727E-01	0.0	-1.988	-1.987	-2.145	-2.168	-2.247		-2.274
-.3491E-01	0.0	-.7971	-.7962	-.8608	-.8680	-.8987		-.9094
.000		0.0	.000	.000	.000	.000	.000		.000
.3491E-01	0.0	.7971	.7962	.8609	.8680	.8988		.9096
.8727E-01	0.0	1.988	1.987	2.147	2.169	2.249		2.277
.1745		0.0	3.963	3.962	4.307	4.388	4.554		4.6
.2618		0.0	5.932	5.937	6.636	6.775	7.001		7.2
.5236		0.0	11.94	11.94	15.27	15.13	24.70		26.0
.7854		0.0	17.93	17.90	23.23	23.48	30.0		32.0
1.047		0.0	23.92	23.86	24.48	55.76	65.0		70.0
1.309		0.0	29.98	29.89	31.0	35.0	40.0		42.0
1.571		0.0	36.10	36.00	38.0	40.0	42.0		44.0
			</tableData>
			</table>
			</product>
			</function>

			<function name="aero/coefficient/Clrs_Spacecraft">
			<description>
				Roll Moment coefficient due to roll speed
			</description>
			<product>
				<table>
					<independentVar lookup="row">aero/qbar-modified-psf</independentVar>
					<tableData>
						0	0
						1	10
						10	100
						100	100
					</tableData>
				</table>
				<property>metrics/Sw-sqft</property>
				<property>metrics/cbarw-ft</property>
				<table>
					<independentVar lookup="row">velocities/p-aero-rad_sec</independentVar>
					<tableData>
						-10	-10
						0	0
						10	10
					</tableData>
				</table>
				<sum>
					<product>
						<value>-0.4</value>
						<table>
							<independentVar lookup="row">systems/spacecraft/main-chute-pos-norm</independentVar>
							<tableData>
								0	1
								1	0
							</tableData>
						</table>
					</product>
					<product>
						<property>aero/bi2vel</property>
						<value>-42.0</value>
						<table>
							<independentVar lookup="row">systems/spacecraft/main-chute-pos-norm</independentVar>
							<tableData>
								0	0
								1	1
							</tableData>
						</table>
					</product>
				</sum>
				<property>stages/spacecraft</property>
			</product>
			</function>

<!--

			<function name="aero/coefficient/Clrs_BrakeChute">
			<description>
				Roll Moment coefficient due to roll speed
			</description>
			<product>
				<table>
					<independentVar lookup="row">aero/qbar-modified-psf</independentVar>
					<tableData>
						0	0
						1	10
						10	100
						100	100
					</tableData>
				</table>
				<property>metrics/Sw-sqft</property>
				<property>metrics/cbarw-ft</property>
				<property>aero/bi2vel</property>
				<table>
					<independentVar lookup="row">velocities/p-aero-rad_sec</independentVar>
					<tableData>
						-10	-10
						0	0
						10	10
					</tableData>
				</table>
				<property>stages/spacecraft</property>
				<value>-100.0</value>
				<pow>
					<property>systems/spacecraft/brake-chute-pos-norm</property>
					<value>2.0</value>
				</pow>
				<difference>
					<value>1</value>
					<property>systems/spacecraft/brake-chute-dropped</property>
				</difference>
				<difference>
					<value>1</value>
					<property>systems/spacecraft/brake-chute-teared</property>
				</difference>
			</product>
			</function>

			<function name="aero/coefficient/Clrs_MainChute">
			<description>
				Roll Moment coefficient due to roll speed
			</description>
			<product>
				<table>
					<independentVar lookup="row">aero/qbar-modified-psf</independentVar>
					<tableData>
						0	0
						1	10
						10	100
						100	100
					</tableData>
				</table>
				<property>metrics/Sw-sqft</property>
				<property>metrics/cbarw-ft</property>
				<property>aero/bi2vel</property>
				<table>
					<independentVar lookup="row">velocities/p-aero-rad_sec</independentVar>
					<tableData>
						-10	-10
						0	0
						10	10
					</tableData>
				</table>
				<property>stages/spacecraft</property>
				<value>-200.0</value>
				<pow>
					<property>systems/spacecraft/main-chute-pos-norm</property>
					<value>2.0</value>
				</pow>
				<difference>
					<value>1</value>
					<property>systems/spacecraft/main-chute-dropped</property>
				</difference>
				<difference>
					<value>1</value>
					<property>systems/spacecraft/main-chute-teared</property>
				</difference>
			</product>
			</function>

-->

		</axis>

		<axis name="YAW">

			<function name="aero/coefficient/Cnr_Spacecraft">
			<description>
				Yaw moment coefficient due to yaw speed
			</description>
			<product>
				<table>
					<independentVar lookup="row">aero/qbar-modified-psf</independentVar>
					<tableData>
						0	0
						1	10
						10	100
						100	100
					</tableData>
				</table>
				<property>metrics/Sw-sqft</property>
				<property>metrics/cbarw-ft</property>
				<table>
					<independentVar lookup="row">velocities/r-aero-rad_sec</independentVar>
					<tableData>
						-10	-10
						0	0
						10	10
					</tableData>
				</table>
				<sum>
					<product>
						<value>-0.4</value>
						<table>
							<independentVar lookup="row">systems/spacecraft/main-chute-pos-norm</independentVar>
							<tableData>
								0	1
								1	0
							</tableData>
						</table>
					</product>
					<product>
						<property>aero/ci2vel</property>
						<value>-42.0</value>
						<table>
							<independentVar lookup="row">systems/spacecraft/main-chute-pos-norm</independentVar>
							<tableData>
								0	0
								1	1
							</tableData>
						</table>
					</product>
				</sum>
				<property>stages/spacecraft</property>
			</product>
			</function>

<!--

			<function name="aero/coefficient/Cnr_BrakeChute">
			<description>
				Yaw moment coefficient due to yaw speed
			</description>
			<product>
				<table>
					<independentVar lookup="row">aero/qbar-modified-psf</independentVar>
					<tableData>
						0	0
						1	10
						10	100
						100	100
					</tableData>
				</table>
				<property>metrics/Sw-sqft</property>
				<property>metrics/cbarw-ft</property>
				<property>aero/ci2vel</property>
				<table>
					<independentVar lookup="row">velocities/r-aero-rad_sec</independentVar>
					<tableData>
						-10	-10
						0	0
						10	10
					</tableData>
				</table>
				<property>stages/spacecraft</property>
				<value>-50.0</value>
				<pow>
					<property>systems/spacecraft/brake-chute-pos-norm</property>
					<value>2.0</value>
				</pow>
				<difference>
					<value>1</value>
					<property>systems/spacecraft/brake-chute-dropped</property>
				</difference>
				<difference>
					<value>1</value>
					<property>systems/spacecraft/brake-chute-teared</property>
				</difference>
			</product>
			</function>

			<function name="aero/coefficient/Cnr_MainChute">
			<description>
				Yaw moment coefficient due to yaw speed
			</description>
			<product>
				<table>
					<independentVar lookup="row">aero/qbar-modified-psf</independentVar>
					<tableData>
						0	0
						1	10
						10	100
						100	100
					</tableData>
				</table>
				<property>metrics/Sw-sqft</property>
				<property>metrics/cbarw-ft</property>
				<property>aero/ci2vel</property>
				<table>
					<independentVar lookup="row">velocities/r-aero-rad_sec</independentVar>
					<tableData>
						-10	-10
						0	0
						10	10
					</tableData>
				</table>
				<property>stages/spacecraft</property>
				<value>-75.0</value>
				<pow>
					<property>systems/spacecraft/main-chute-pos-norm</property>
					<value>2.0</value>
				</pow>
				<difference>
					<value>1</value>
					<property>systems/spacecraft/main-chute-dropped</property>
				</difference>
				<difference>
					<value>1</value>
					<property>systems/spacecraft/main-chute-teared</property>
				</difference>
			</product>
			</function>

-->

		</axis>

	</aerodynamics>

	<system file="Angles">
	</system>

	<system file="autopilot">
	</system>

	<!--<system file="Temperature">
	</system>-->

	<system file="entry_temperature">
	</system>

	<system file="Calculations">
	</system>

	<system file="Firststage">
	</system>

	<system file="Secondstage">
	</system>

	<system file="Thirdstage">
	</system>

	<system file="Enginespanel">
	</system>

	<system file="Orientationpanel">
	</system>

	<system file="Mainpanel">
	</system>

	<system file="Gascontrol">
	</system>

	<system file="Orientationcomputer">
	</system>

	<system file="Controlhandle">
	</system>

	<system file="Rightswitchpanel">
	</system>

	<system file="Vzor">
	</system>

	<system file="Backilluminator">
	</system>

	<system file="Rightilluminator">
	</system>

	<system file="Leftswitchpanel">
	</system>

	<system file="Spacecraft">
	</system>

	<system file="TDU">
	</system>

	<system file="Sounds">
	</system>

	<system file="Arthorizon">
	</system>

</fdm_config>
